Simulations: Version=12
  Memo Introduction
    Hamish Brown, Rob Zyskowski, Edmar I. Teixeira

    The New Zealand Institute for Plant & Food Research Limited, Private Bag 4704, Christchurch, New Zealand

    Developed using wheat as a starting point.
  Memo FIXME
    Issues to be resulved:

    (1) Soil temperature does not respond to canopy cover ... data show temperature difference in N and water treatments but simulations are identical. What's impact on N mineralisation? (eit 30 Aug 2017)
  Replacements
    Plant Oats: CropType=Wheat
      Memo TitlePage
        # An APSIM Oat Model

        _Zyskowski,R.F, Brown, H.E. and Texiera,E._

        The APSIM Oat model has been developed using the Plant Modelling Framework (PMF) of [brown_plant_2014], and is heavily based on  many pricipals implemented within. This framework provides a library of plant organ and process submodels that can be coupled, at runtime, to construct a model in much the same way that models can be coupled to construct a simulation. This means that dynamic composition of lower level process and organ classes (e.g. photosynthesis, leaf) into larger constructions (e.g. maize, wheat, sorghum) can be achieved by the model developer without additional coding.

        The model consists of:

        * a phenology model to simulate development between growth phases
        * a structure model to simulate plant morphology
        * a collection of organs to simulate the various plant parts
        * an arbitrator to allocate resources (N, biomass) to the various plant organs
      Memo Rerferences
        Brown, H. E., et al. (2014). "Plant Modelling Framework: Software for building and running crop models on the APSIM platform." Environmental Modelling & Software 62: 385-398.

        Jamieson, P. D. and C. A. Munro (1999). A simple method for the phenological evaluation of new cereal cultivars. Agronomy Society of New Zealand - Proceedings, Twenty-Ninth Annual Conference, 1999. J. G. Hampton and K. M. Pollock. 29: 63-68.

        Martin, R. J., et al. (1998). The effect of daylength on final leaf number in drummond oats. Australian Agronomy Conference. Wagga Wagga.

        Sonego, M., et al. (1998). Cordination of apex and leaf deceolpment in oats. Austrlian Agronomy conference. Wagg Wagga.

        Martin, R. J. and I. N. C. Agron Soc New Zealand (1996). The effect of sowing date on growth and yield of two cultivars of oats.
        	Oats cvs. Cashel and Drummond were sown at Lincoln on 16 September, 2 November, and 21 December 1994; and on 7 February, 3 April, and 16 May 1995 in order to compare the effect of sowing date on their growth and yield. Biomass and leaf area were measured at one to four-week intervals from the end of tillering. Crops grew for periods ranging from just over 100 days to nearly 300 days. The crop sown in February died before maturity, and the one sown in April was affected by frost. Biomass production was much higher for the April sowing (over 20 t/ha) than the 7.5-15 t/ha for the other sowings, and was higher for Drummond than for Cashel at all sowing dates. Leaf area indices did not exceed 4.5 except for the February and April sowings of Drummond. There was a strong linear relationship between cumulative biomass production and intercepted radiation for all sowing dates, with the same rate of increase in biomass with radiation increase for both cultivars. Grain yields estimated from quadrat samples were higher than header yields for all sowings, but especially for the April sowing in which grain weights and harvest indices were lower than for the other sowings. Fifty-seven percent of grain yield came from post anthesis photosynthesis and 43% from remobilization from other plant parts. Oat yield is dependent on the amount of radiation intercepted by the crop and harvest index. Changes in conversion of radiation to biomass were not significantly affected by the range of conditions experienced by the crops in this study.

        Martin, R. J., et al. Effects of Timing and Intensity of Drought on the Yield of Oats (Avena sativa L.). Australian Agronomy
        Hobart.
        	The response of oats (Avena sativa L.) to timing and intensity of drought was determined in a mobile
        rainshelter, which excluded rainfall during crop growth. Ten irrigation treatments subjected the crops to
        drought of varying duration at different stages during plant growth; the crops were otherwise fully
        irrigated. Oat grain yield generally increased linearly with cumulative water use, and decreased linearly as
        the maximum potential soil moisture deficit experienced during crop growth increased, regardless of the
        timing of drought. The exception to this was the no drought (fully irrigated) treatment, where lodging
        reduced panicle number and grain weight compared to early drought treatments. Drought affected yield
        mainly by reducing panicle and grain number, effects on grain weight were small. . Relieving early drought
        through late irrigation led to more late tillers, more panicles, heavier grains, and later maturity. Full and
        late drought increased screenings.

        Sonego, M., et al. (1999). Development and growth of oat leaves at different temperatures and nitrogen levels. Agronomy Society of New Zealand - Proceedings, Twenty-Ninth Annual Conference, 1999. J. G. Hampton and K. M. Pollock. 29: 75-81.
        	This paper reports the development of a model to predict leaf appearance rate in oats (Avena sativa L.) based on the results of two field experiments and including a comparison of air and near-apex soil temperatures as predictors of leaf appearance. Oat genotype C&F 435 was sown on eight dates from April 1996 to November 1997. Nitrogen treatments (0 and 100 kg N/ha) were applied to the May and November 1997 crops. Observation of the number of visible leaf tips and leaf lamina length were taken at 2-7 day intervals. Near apex soil temperature and air temperature were recorded by data loggers. The number of visible tips was linearly related to temperature expressed as accumulated thermal time (base temperature of 0 degreesC). The rate of leaf appearance in thermal time, using either air or soil temperature, was nearly constant within a sowing date, but faster for spring sown than for autumn sown crops. Differences in this rate were less among sowing dates when near apex soil temperature was used to calculate thermal time than when screen temperatures were used. This indicated that the use of temperature near the shoot apex may improve phenological predictions from crop models. Nitrogen application had no effect on the rate of leaf appearance regardless of sowing date, but caused an average increase of 19% (P < 0.05) in the final leaf lamina length for the last five leaves.

        Sonego, M., et al. (1997). Phenological development of oat crops in response to sowing dates. Proceedings of the Twenty-Seventh Annual Conference of the Agronomy Society of New Zealand. 27: 115-118.
        	Observations of apical development in oats were made from sowings made on six occasions through an annual cycle. These were analysed to determine the effects of temperature and daylength on the duration of the period from sowing until anthesis. A simple, two-phase thermal time accumulation model, modified by daylength in the post emergence phase, accounted for most of the variation (n = 6, CV = 6%).

        Zhao, G. Q., et al. (2009). "Response of Nitrogen Uptake and Partitioning to Critical Nitrogen Supply in Oat Cultivars." Crop Science 49(3): 1040-1048.
        	Nitrogen uptake and partitioning in oat (Avena sativa L.) are not well documented. A greenhouse study was conducted to determine the critical timing of N supply on the growth, N uptake, and partitioning. Plants grown in plastic pots were subjected to five N fertilization regimes: (i) control, N supply from seedling to physiological maturity (PM); (ii) N supply from seedling to flag leaf; (iii) N supply from flag leaf to PM; (iv) N supply from seedling to heading; and (v) N supply from heading to PM. Leaf chlorophyll content, plant dry matter (DM), and N uptake and accumulation were measured. Total plant DM was 21% greater for naked 'VAO-2' than for covered 'Prescott', while both genotypes produced similar grain yields. Varietal differences in total plant N were significant (P < 0.05) with average of 18% higher N content for VAO-2, but most of its accumulated N was in the vegetative components. For both varieties, N supply was more critical before heading than thereafter. Compared with the control, restriction of N supply from seedling to flag leaf stage significantly reduced spikelet number (28%) and grain yield (26%). Withholding N supply until heading reduced yield by up to 65% and N uptake by 75%. No yield reduction occurred when N was withheld from flag leaf or heading to PM. Although naked VAO-2 accumulated more N than Prescott under the same conditions, partitioning of N to the grain in VAO-2 was less efficient.
      OrganArbitrator Arbitrator
        RelativeAllocation NArbitrator
        RelativeAllocation DMArbitrator
      Phenology: DaysAfterSowing=0
        Memo
          The oats varieties used in this model have shown no sign of winter vernilisation, and the models used here reflect that.

          The data  shows a slowdown in phenological developement in winter conditions, which could be due to temperature and photo period.

          Here we go with published data of Martin et al which usesa Photo Thermal model.
        MultiplyFunction ThermalTime
          Memo
            Photothermal time based on Sonego 1997

            TTbase = T-0

            FP = Max (0, (P -7)/9)

            TT = TTBase*FP

            Note.  Effectively Mid winter thermal time approaces 0, whereas midsummer approaches TTbase thus mabely accumlating a low temperature eefect.
          AirTemperatureFunction ThermalTimeB0
            XYPairs: X=[0, 15, 30, 40]; Y=[0, 15, 30, 0]
            Memo
              Thermal time determines the rate of developmental progress through many of the crops phases and is used by organs to determing potential growth rates.
          MaximumFunction FP
            Constant Zero: FixedValue=0
            DivideFunction
              SubtractFunction PP7
                VariableReference Photoperiod: VariableName=[Phenology].Photoperiod.Value()
                Constant Seven: FixedValue=7
              Constant Nine: FixedValue=9
        SoilTemperatureFunction: maxt_soil_surface=20; mint_soil_surface=10
          XYPairs: X=[0, 30, 40]; Y=[0, 30, 0]
        PhotoperiodFunction Photoperiod: Twilight=-6; DayLength=0
        PhotoperiodDeltaFunction: Twilight=-6
        PhaseLookup PercievedPhotoPeriod
          PhaseLookupValue ApexBelowGround: Start=Germination; End=Emergence
            Constant Photoperiod: FixedValue=0; Units=h
          PhaseLookupValue ApexAboveGround: Start=Emergence; End=HarvestRipe
            MultiplyFunction
              VariableReference Photoperiod: VariableName=[Phenology].Photoperiod.Value()
              LinearInterpolationFunction: XProperty=[Phenology].PhotoperiodDeltaFunction.Value()
                XYPairs: X=[-24, 0, 0.1, 24]; Y=[0, 0, 1, 1]
        Constant VrnSensitivity: FixedValue=0; Units=Leaves
          Memo
            The difference between Inherent earlyness leaf number and the number of leaves produced when the plant is unvernalisaed and grown in long photoperiod

            Not used in oats
        Constant MinimumLeafNumber: FixedValue=6; Units=Leaves
          Memo
            Number of leaves the plant will produce when fully vernalised early and grown in long photoperiod
        Constant VernLag: FixedValue=1; Units=Unitless
          Memo
            The amount of vernalising temperature required before vernalisation response will be evident.  Value of relative to the amount offl vernalisation temperature required from the end of the lag until vernalisation saturation.  A value of 0 means there is no lag, a value of 1 means the lag is the same (in vernal time) as the vernalisation requirement and a value of 2 means the lag is twice as long as the vernalisation response phase

            Not used in oats
        Constant PpSensitivity: FixedValue=6; Units=Leaves
          Memo
            The reduction in leaf number going from 8 to 16 h Pp

            Not used in current oat model
        Constant EarlyReproductivePpSensitivity: FixedValue=0
          Memo
            The phyllochrons duration for the plant to go from flag leaf ligual appearance at 16 h Pp compared to the phyllochron duration for the same phase at 8 h Pp.

            Not used in curreent oat model.
        Constant EarlyReproductiveLongDayBase: FixedValue=2.5
          Memo
            The phyllochrons duration for the plant to go from flag leaf ligual appearance at 16 h Pp.

            Not used in current oat model.
        GerminatingPhase Germinating: Start=Sowing; End=Germination
        EmergingPhase Emerging: Start=Germination; End=Emergence; ShootLag=40; ShootRate=3
          VariableReference ThermalTime: VariableName=[Phenology].ThermalTime.Value()
        GenericPhase Vegetative: Start=Emergence; End=VS
          Memo
            This is the first 4-6 leaf growth of the emerged oat plant, In the current model is decides the final leaf number based on Martin et al 1998.

            At the end of this grwth stage a trigger event occurs which calculates the FLN.

            Currently the leaf number is 4, due to March sowings in which th sixth leaf dosn'y emerge until after june.
          VariableReference ThermalTime: VariableName=[Phenology].ThermalTime.Value()
          MultiplyFunction Target
            Constant Six: FixedValue=4
            VariableReference Phyll: VariableName=[Structure].BasePhyllochron.Value()
        GenericPhase EarlyReproductive: Start=VS; End=TerminalSpikelet
          Memo
            Growth occurs until terminal spikelet occurs.

            In this case TS is driven fron the FLN

            Duration is (TS-6)*Phyllocgron
          VariableReference ThermalTime: VariableName=[Phenology].ThermalTime.Value()
          MultiplyFunction Target
            SubtractFunction
              VariableReference TST: VariableName=[Structure].TSLN.Value()
              Constant Six: FixedValue=6
            VariableReference Phyllochron: VariableName=[Structure].BasePhyllochron.Value()
        GenericPhase StemElongation: Start=TerminalSpikelet; End=FlagLeaf
          Memo
            The Time for the FlagLeaf to appear post TS

            1.5 * Phyylchron
          VariableReference ThermalTime: VariableName=[Phenology].ThermalTime.Value()
          MultiplyFunction Target
            VariableReference Phyllochron: VariableName=[Structure].BasePhyllochron.Value()
            Constant exp: FixedValue=1.5
        GenericPhase EarDevelopment: Start=FlagLeaf; End=Flowering
          VariableReference ThermalTime: VariableName=[Phenology].ThermalTime.Value()
          Memo
            The Time from flagLeaf  appearanace  to flowering

            Was constant at 100, however have cahnge it 1 Phyllchron.
          MultiplyFunction Target
            VariableReference Phyllochron: VariableName=[Structure].BasePhyllochron.Value()
            Constant exp: FixedValue=1
        GenericPhase GrainDevelopment: Start=Flowering; End=StartGrainFill
          Constant Target: FixedValue=240
          VariableReference ThermalTime: VariableName=[Phenology].ThermalTime.Value()
        GenericPhase GrainFilling: Start=StartGrainFill; End=EndGrainFill
          Constant Target: FixedValue=900
          VariableReference ThermalTime: VariableName=[Phenology].ThermalTime.Value()
        GenericPhase Maturing: Start=EndGrainFill; End=Maturity
          Constant Target: FixedValue=35
          VariableReference ThermalTime: VariableName=[Phenology].ThermalTime.Value()
        GenericPhase Ripening: Start=Maturity; End=HarvestRipe
          Constant Target: FixedValue=300
          VariableReference ThermalTime: VariableName=[Phenology].ThermalTime.Value()
        EndPhase ReadyForHarvesting: Start=HarvestRipe; End=Unused
          VariableReference ThermalTime: VariableName=[Phenology].ThermalTime.Value()
        ZadokPMF Zadok
        OnEventFunction FlagLeafDAS: SetEvent=FlagLeaf; ReSetEvent=never
          Memo
            A function is used to provide flowering date as days after sowing(DAS).
          Constant PreEventValue: FixedValue=0
          VariableReference PostEventValue: VariableName=[Phenology].DaysAfterSowing
        OnEventFunction FloweringDAS: SetEvent=Flowering; ReSetEvent=never
          Memo
            A function is used to provide flowering date as days after sowing(DAS).
          Constant PreEventValue: FixedValue=0
          VariableReference PostEventValue: VariableName=[Phenology].DaysAfterSowing
        OnEventFunction MaturityDAS: SetEvent=Maturity; ReSetEvent=never
          Memo
            A function is used to provide maturity date as days after sowing(DAS).
          Constant PreEventValue: FixedValue=0
          VariableReference PostEventValue: VariableName=[Phenology].DaysAfterSowing
      Structure: Initialised=false; Germinated=false; Emerged=false; CohortToInitialise=0; TipToAppear=0; ApexNum=0
        VariableReference ThermalTime: VariableName=[Phenology].ThermalTime.Value()
        MultiplyFunction Phyllochron
          Memo Rational
            Based on [Jamieson_SIRIUS_1998] where leaf appearace could be described by a base phyllochron determined between leaves 2 and 7 and a phyllochron that was 70% of base phyllochron for leaves < 2 and 130% of base phyllochron for leaves > 7
          LinearInterpolationFunction LeafStageFactor: XProperty=[Leaf].AppearedCohortNo
            XYPairs: X=[0, 2, 4, 6, 8, 14, 18]; Y=[0.75, 0.9, 1, 1.1, 1.2, 1.4, 1.5]
          LinearInterpolationFunction PhotoPeriodEffect: XProperty=[Phenology].Photoperiod.Value()
            XYPairs: X=[8, 12, 14]; Y=[1, 1, 1]
          VariableReference Phyllochron: VariableName=[Structure].BasePhyllochron.Value()
        MultiplyFunction BranchingRate
          PhaseLookup PotentialBranchingRate
            PhaseLookupValue Vegetative: Start=Emergence; End=TerminalSpikelet
              LinearInterpolationFunction PotentialBranchingRate: XProperty=[Structure].LeafTipsAppeared
                XYPairs: X=[1, 2, 3, 4, 5, 6, 7, 8]; Y=[0, 0, 1, 2, 4, 7, 12, 20]
            PhaseLookupValue Reproductive: Start=TerminalSpikelet; End=HarvestRipe
              Constant Zero: FixedValue=0
          MinimumFunction StressFactors
            LinearInterpolationFunction WSC: XProperty=[Stem].PercentWSC.Value()
              XYPairs: X=[0.2, 0.27]; Y=[1, 1]
            LinearInterpolationFunction Nitrogen: XProperty=[Arbitrator].FN
              XYPairs: X=[0.5, 2, 3]; Y=[0, 1, 1]
            LinearInterpolationFunction Cover: XProperty=[Leaf].CoverTotal
              XYPairs: X=[0, 0.1, 0.25]; Y=[1, 1, 0]
            LinearInterpolationFunction Growth: XProperty=[Structure].MeanTillerGrowthRate.Value()
              XYPairs: X=[0, 0.001, 0.005]; Y=[1, 1, 1]
            LinearInterpolationFunction PhotoPeriodEffect: XProperty=[Phenology].Photoperiod.Value()
              XYPairs: X=[11.99, 12, 14]; Y=[1, 1, 1]
            LinearInterpolationFunction TemperatureEffect: XProperty=[Weather].MeanT
              XYPairs: X=[4, 10, 14]; Y=[1, 1, 1]
        PhaseLookup BranchMortality
          PhaseLookupValue MortalityPhase: Start=FlagLeaf; End=Flowering
            MultiplyFunction Mortality
              LinearInterpolationFunction MortalityPerDegDay: XProperty=[Structure].MeanTillerGrowthRate.Value()
                XYPairs: X=[0, 0.005, 0.005]; Y=[0.002, 0, 0]
              VariableReference ThermalTime: VariableName=[Phenology].ThermalTime.Value()
        HeightFunction HeightModel
          LinearInterpolationFunction PotentialHeight: XProperty=[Phenology].Stage
            XYPairs: X=[3, 4, 5, 6, 7]; Y=[10, 200, 1000, 1100, 1200]
          LinearInterpolationFunction WaterStress: XProperty=[Oats].WaterSupplyDemandRatio
            XYPairs: X=[0.3, 1]; Y=[0, 1]
        MovingAverageFunction MeanTillerGrowthRate: NumberOfDays=5; InitialValue=0
          DivideFunction TillerGrowthRate
            VariableReference DailyGrowth: VariableName=[Arbitrator].DM.TotalFixationSupply
            VariableReference ThermalTime: VariableName=[Phenology].ThermalTime.Value()
            VariableReference StemPopulation: VariableName=[Structure].TotalStemPopn
        MovingAverageFunction MeanPhyllochron: NumberOfDays=300; InitialValue=80
          VariableReference Phyllochron: VariableName=[Structure].Phyllochron.Value()
        DivideFunction HaunStageTerminalSpikelet
          SubtractFunction FLNlessIntercept
            VariableReference FinalLeafNumber: VariableName=[Structure].FinalLeafNumber.Value()
            Constant Intercept: FixedValue=2.85
          Constant Slope: FixedValue=1.1
        AddFunction HaunStage
          VariableReference AppearedLeaves: VariableName=[Leaf].ExpandedCohortNo
          VariableReference ProportionOfExpandingLeaf: VariableName=[Leaf].NextExpandingLeafProportion
        PhaseLookup ThermalTimeP
          PhaseLookupValue SoilTemperature: Start=Sowing; End=TerminalSpikelet
            SoilTemperatureFunction: maxt_soil_surface=20; mint_soil_surface=10
              XYPairs: X=[0, 30, 40]; Y=[0, 30, 0]
          PhaseLookupValue AirTemperature: Start=TerminalSpikelet; End=HarvestRipe
            AirTemperatureFunction
              XYPairs: X=[0, 30, 40]; Y=[0, 30, 0]
        MinimumFunction FinalLeafNumber
          Memo
            An event driven method of calculating the final leaf number, Base on Martin et al 1998

            Event  occurs when vegtative stage switches to Reproductive, either 4 or 6 leaf appearance.

            If event occurs when PhotoPeriod is decreasing, then final leaf number is the MLN -2.

            Otherwise

            FLN = MLN - lc(PPS)

            For Drummond these values  MLN = 17 and Lc = 0.56

            THe model allows these to be cultivar deined.
          Constant MaxLN: FixedValue=15
          MinimumFunction FLN
            OnEventFunction AtLeafSix: SetEvent=VS; ReSetEvent=never
              VariableReference PreEventValue: VariableName=[Structure].MaxLN.Value()
              MaximumFunction PostEventValue
                Constant Zero: FixedValue=0
                LessThanFunction
                  VariableReference TestVariable: VariableName=[Phenology].PhotoperiodDeltaFunction.Value()
                  Constant Zero: FixedValue=0
                  SubtractFunction IfTrue
                    VariableReference MLN: VariableName=[Structure].MaxLN.Value()
                    Constant Two: FixedValue=2
                  SubtractFunction IfFalse
                    VariableReference MLN: VariableName=[Structure].MaxLN.Value()
                    MultiplyFunction Ic
                      VariableReference PP: VariableName=[Phenology].Photoperiod.Value()
                      VariableReference PPS: VariableName=[Structure].PPSlope.Value()
            VariableReference MLN: VariableName=[Structure].MaxLN.Value()
        MinimumFunction TSLN
          Memo
            Terminal spikelet leaf number

            This value is highly related to final leaf number, The FLN is probably dependent on TSLN rather than as cuurently defined.

            Calculation baed on Sonego 2000

            TSLN = FLN*0.995 - 1.95
          VariableReference MLN: VariableName=[Structure].MaxLN.Value()
          SubtractFunction
            MultiplyFunction
              VariableReference FLN: VariableName=[Structure].FinalLeafNumber.Value()
              Constant PS: FixedValue=0.995
            Constant LVS: FixedValue=1.95
        Constant MaxLN: FixedValue=17
        Constant BasePhyllochron: FixedValue=90; Units=oC.d
        Constant PPSlope: FixedValue=0.5
        Constant StemSenescenceAge: FixedValue=0
      ReproductiveOrgan Grain: GrowthRespiration=0; MaintenanceRespiration=0; RipeStage=Ripe
        Memo
          Grain model current a pure supply model, that is currently uses  a partition model to determine amount

          The grain Number model model left here does nothing, it is there so we can switch to it later if required.

          N conc values are from Zhao et al 2009
        Biomass Live
        Biomass Dead
        Constant MaxNConcDailyGrowth: FixedValue=0.03
        Constant WaterContent: FixedValue=0.12
        Constant MinimumNConc: FixedValue=0.032; Units=0.045
        Constant MaximumNConc: FixedValue=0.03
        Constant MaximumPotentialGrainSize: FixedValue=0.043; Units=g
        PhaseBasedSwitch NitrogenDemandSwitch: Start=Germination; End=Maturity
        AccumulateFunction AccumThermalTime: StartStageName=Flowering; EndStageName=Maturity; FractionRemovedOnCut=0; FractionRemovedOnHarvest=0; FractionRemovedOnGraze=0; FractionRemovedOnPrune=0
          VariableReference DailyThermalTimeValue: VariableName=[Phenology].ThermalTime.Value()
        AirTemperatureFunction FillingRate
          XYPairs: X=[0, 26, 30, 35]; Y=[0, 0.0015, 0.0015, 0.0015]
        PartitionFractionDemandFunction DMDemandFunction
          Memo
            Currently using Partitioning model based on SIRIUS rather tha grin filling model.
          PhaseLookup PartitionFraction
            PhaseLookupValue InitialPhase: Start=Flowering; End=StartGrainFill
              Constant: FixedValue=0.01
            PhaseLookupValue LinearPhase: Start=StartGrainFill; End=EndGrainFill
              MultiplyFunction
                Constant: FixedValue=0.6
                LinearInterpolationFunction FW: XProperty=[Leaf].Fw
                  XYPairs: X=[0, 0.5, 1]; Y=[1.5, 1, 1]
            PhaseLookupValue Ripening: Start=EndGrainFill; End=HarvestRipe
              Constant: FixedValue=0
        ExpressionFunction Protein
          Expression=([Grain].Live.N + [Grain].Dead.N)/([Grain].Live.Wt + [Grain].Dead.Wt) * 100 * 5.71
        DivideFunction GrowthRateGrainDevelopment
          AccumulateFunction AccumulatedGrowth: StartStageName=FlagLeaf; EndStageName=StartGrainFill; FractionRemovedOnCut=0; FractionRemovedOnHarvest=0; FractionRemovedOnGraze=0; FractionRemovedOnPrune=0
            VariableReference DailyBiomassProduction: VariableName=[Arbitrator].DM.TotalFixationSupply
          AccumulateFunction DaysOfGrainDevelopment: StartStageName=FlagLeaf; EndStageName=StartGrainFill; FractionRemovedOnCut=0; FractionRemovedOnHarvest=0; FractionRemovedOnGraze=0; FractionRemovedOnPrune=0
            Constant LenthOfADay: FixedValue=1; Units=days/day
        Constant InitialGrainProportion: FixedValue=0.2
        PhaseLookup NFillingRate
          PhaseLookupValue GrainFilling: Start=Flowering; End=EndGrainFill
            FillingRateFunction
              VariableReference NumberFunction: VariableName=[Grain].NumberFunction.Value()
              AddFunction FillingDuration
                VariableReference FloweringToGrainFilling: VariableName=[Phenology].GrainDevelopment.Target.Value()
                VariableReference GrainFilling: VariableName=[Phenology].GrainFilling.Target.Value()
              VariableReference ThermalTime: VariableName=[Phenology].ThermalTime.Value()
              MultiplyFunction PotentialSizeIncrement
                Constant MaximumFinalNConc: FixedValue=0.026; Units=g/g
                VariableReference MaximumSize: VariableName=[Grain].MaximumPotentialGrainSize.Value()
        BiomassRemoval BiomassRemovalDefaults
          OrganBiomassRemovalType Harvest: FractionLiveToRemove=1; FractionDeadToRemove=0; FractionLiveToResidue=0; FractionDeadToResidue=0
          OrganBiomassRemovalType Cut: FractionLiveToRemove=1; FractionDeadToRemove=0; FractionLiveToResidue=0; FractionDeadToResidue=0
          OrganBiomassRemovalType Prune: FractionLiveToRemove=0; FractionDeadToRemove=0; FractionLiveToResidue=0.8; FractionDeadToResidue=0
          OrganBiomassRemovalType Graze: FractionLiveToRemove=0.6; FractionDeadToRemove=0; FractionLiveToResidue=0.2; FractionDeadToResidue=0
          OrganBiomassRemovalType Thin: FractionLiveToRemove=0; FractionDeadToRemove=0; FractionLiveToResidue=0.05; FractionDeadToResidue=0
        HoldFunction NumberFunction: WhenToHold=Flowering
          MultiplyFunction ValueToHold
            Constant GrainsPerGramOfStem: FixedValue=22; Units=grains
            VariableReference StemMass: VariableName=[StemPlusSpike].Wt
              VariableReference StemMass: VariableName=[StemPlusSpike].Wt
      Root: GrowthRespiration=0; MaintenanceRespiration=0
        CompositeBiomass Live: Propertys=[[Root].LayerLive]
        CompositeBiomass Dead: Propertys=[[Root].LayerDead]
        LinearInterpolationFunction KLModifier: XProperty=[Leaf].LAI
          XYPairs: X=[0, 3]; Y=[1, 1]
        Constant SoilWaterEffect: FixedValue=1
        Constant MaxDailyNUptake: FixedValue=20
        Constant SenescenceRate: FixedValue=0.005
        Constant StructuralFraction: FixedValue=1
        Constant MaximumRootDepth: FixedValue=1000000
        Constant MaximumNConc: FixedValue=0.01
        Constant MinimumNConc: FixedValue=0.01
        PhaseLookup RootFrontVelocity
          PhaseLookupValue PreEmergence: Start=Germination; End=Emergence
            Constant Value: FixedValue=5
          PhaseLookupValue PostEmergence: Start=Emergence; End=Maturity
            Constant Value: FixedValue=20
        PhaseBasedSwitch NitrogenDemandSwitch: Start=Germination; End=Maturity
        BiomassRemoval BiomassRemovalDefaults
          OrganBiomassRemovalType Harvest: FractionLiveToRemove=0; FractionDeadToRemove=0; FractionLiveToResidue=0.2; FractionDeadToResidue=0
          OrganBiomassRemovalType Cut: FractionLiveToRemove=0; FractionDeadToRemove=0; FractionLiveToResidue=0.3; FractionDeadToResidue=0
          OrganBiomassRemovalType Prune: FractionLiveToRemove=0; FractionDeadToRemove=0; FractionLiveToResidue=0.1; FractionDeadToResidue=0
          OrganBiomassRemovalType Graze: FractionLiveToRemove=0; FractionDeadToRemove=0; FractionLiveToResidue=0.15; FractionDeadToResidue=0
          OrganBiomassRemovalType Thin: FractionLiveToRemove=0; FractionDeadToRemove=0; FractionLiveToResidue=0.05; FractionDeadToResidue=0
        LinearInterpolationFunction KNO3: XProperty=[Root].LengthDensity
          XYPairs: X=[0, 0.004]; Y=[0.002, 0.02]
        LinearInterpolationFunction KNH4: XProperty=[Root].LengthDensity
          XYPairs: X=[0, 0.004]; Y=[0.001, 0.01]
        LinearInterpolationFunction NUptakeSWFactor: XProperty=[Root].RWC
          XYPairs: X=[0, 0.2, 1]; Y=[1, 1, 1]
        Constant InitialDM: FixedValue=0.2; Units=g/plant
        Constant SpecificRootLength: FixedValue=40; Units=m/g
        PartitionFractionDemandFunction DMDemandFunction
          PhaseLookup PartitionFraction
            PhaseLookupValue PreEmergence: Start=Germination; End=Emergence
              Constant Value: FixedValue=0
            PhaseLookupValue PreFlowering: Start=Emergence; End=Flowering
              Constant Value: FixedValue=0.2
            PhaseLookupValue PostFlowering: Start=Flowering; End=EndGrainFill
              Constant Value: FixedValue=0
      Leaf: MaxCover=1; Albedo=0.2; Gsmax=0.015; R50=150; MicroClimatePresent=true; KDead=0.3; MaximumMainStemLeafNumber=30
        zero: GrowthRespiration, MaintenanceRespiration, CurrentExpandingLeaf, StartFractionExpanded, FractionNextleafExpanded, DeadNodesYesterday, FRGR, PotentialEP, DMConversionEfficiency, TipsAtEmergence, CohortsAtInitialisation, FractionDied
        LeafCohort InitialLeaves[1]: Rank=1; Area=200
          zero: NReallocationFactor, DMReallocationFactor, NRetranslocationFactor, DMRetranslocationFactor, ShadeInducedSenRate, SenescedFrac, DeltaPotentialArea, DeltaWaterConstrainedArea, DeltaCarbonConstrainedArea, PotentialStructuralDMAllocation, PotentialMetabolicDMAllocation, MetabolicNReallocated, MetabolicWtReallocated, StorageNReallocated, StorageWtReallocated, MetabolicNRetranslocated, StorageNRetrasnlocated, DMRetranslocated, MetabolicNAllocation, StructuralDMAllocation, MetabolicDMAllocation, MaintenanceRespiration
        LeafCohort InitialLeaves[2]: Rank=2
          zero: NReallocationFactor, DMReallocationFactor, NRetranslocationFactor, DMRetranslocationFactor, ShadeInducedSenRate, SenescedFrac, DeltaPotentialArea, DeltaWaterConstrainedArea, DeltaCarbonConstrainedArea, PotentialStructuralDMAllocation, PotentialMetabolicDMAllocation, MetabolicNReallocated, MetabolicWtReallocated, StorageNReallocated, StorageWtReallocated, MetabolicNRetranslocated, StorageNRetrasnlocated, DMRetranslocated, MetabolicNAllocation, StructuralDMAllocation, MetabolicDMAllocation, Area, MaintenanceRespiration
        CompositeBiomass Live: Propertys=[[Leaf].CohortLive]
        CompositeBiomass Dead: Propertys=[[Leaf].CohortDead]
        ArrayBiomass CohortArrayLive: Propertys=[[Leaf].Live]; ArraySize=[Leaf].MaxNodeNo
        ArrayBiomass CohortArrayDead: Propertys=[[Leaf].Dead]; ArraySize=[Leaf].MaxNodeNo
        LeafCohortParameters CohortParameters
          Constant NReallocationFactor: FixedValue=1
          Constant MaintenanceRespirationFunction: FixedValue=0
          Constant NRetranslocationFactor: FixedValue=0.03
          Constant DMReallocationFactor: FixedValue=0
          Constant DMRetranslocationFactor: FixedValue=0.1
          MinimumFunction CellDivisionStress
            LinearInterpolationFunction WaterStressFactor: XProperty=[Oats].WaterSupplyDemandRatio
              XYPairs: X=[0, 1]; Y=[0.5, 1]
            LinearInterpolationFunction NitrogenStressFactor: XProperty=[Oats].Leaf.Fn
              XYPairs: X=[0, 0.5, 1]; Y=[0.1, 0.1, 1]
          MinimumFunction ExpansionStress
            LinearInterpolationFunction WaterStress: XProperty=[Oats].WaterSupplyDemandRatio
              XYPairs: X=[0, 0.7, 1]; Y=[0, 1, 1]
            LinearInterpolationFunction TemperatureEffect: XProperty=[Weather].MeanT
              XYPairs: X=[0, 12, 14]; Y=[0, 1, 1]
          MultiplyFunction MaxArea
            Constant AreaLargestLeaves: FixedValue=5000; Units=mm^2
            LinearInterpolationFunction AgeFactor: XProperty=[Phenology].Stage
              XYPairs: X=[3, 4, 5, 7, 9]; Y=[0.1, 0.5, 1, 0.5, 0]
              Memo
                Growth Stages and Phenology
                1 Sowing
                2 Germination
                3 Emergence
                4 VS
                5 TS
                6 FLag leaf
                7 Flowering
                8 SGF
                9 EGF
                10 HR
                11
          MultiplyFunction GrowthDuration
            Constant Multiplier: FixedValue=4
            VariableReference Phyllochron: VariableName=[Structure].Phyllochron.Value()
          PhaseLookup LagDurationP
            PhaseLookupValue VegetativeGrowth: Start=Emergence; End=TerminalSpikelet
              MultiplyFunction LagDuration
                VariableReference Phyllochron: VariableName=[Structure].Phyllochron.Value()
                LinearInterpolationFunction AgeFactor: XProperty=[Phenology].Stage
                  XYPairs: X=[0, 4, 9, 11]; Y=[1, 7, 9, 0]
                  Memo
                    Growth Stages and Phenology
                    1 Sowing
                    2 Germination
                    3 Emergence
                    4 VS
                    5 TS
                    6 FLag leaf
                    7 Flowering
                    8 SGF
                    9 EGF
                    10 HR
                    11
                Constant Multiplier: FixedValue=1
            PhaseLookupValue StemElongation: Start=TerminalSpikelet; End=Maturity
              SubtractFunction LagDuration
                AddFunction ThermalTimeToRipe
                  VariableReference GrainDevelopment: VariableName=[Phenology].GrainDevelopment.Target.Value()
                  VariableReference GrainFilling: VariableName=[Phenology].GrainFilling.Target.Value()
                  VariableReference Maturing: VariableName=[Phenology].Maturing.Target.Value()
                  VariableReference Ripening: VariableName=[Phenology].Ripening.Target.Value()
                ExpressionFunction SenescenceDuration: Expression=[Leaf].CohortParameters.SenescenceDuration.Value()
          MultiplyFunction LagDuration
            VariableReference Phyllochron: VariableName=[Structure].Phyllochron.Value()
            LinearInterpolationFunction AgeFactor: XProperty=[Phenology].Stage
              XYPairs: X=[0, 4, 9, 11]; Y=[1, 2, 3, 0]
              Memo
                Growth Stages and Phenology
                1 Sowing
                2 Germination
                3 Emergence
                4 VS
                5 TS
                6 FLag leaf
                7 Flowering
                8 SGF
                9 EGF
                10 HR
                11
            Constant Multiplier: FixedValue=1
          MultiplyFunction SenescenceDuration
            Constant Multiplier: FixedValue=1
            VariableReference Phyllochron: VariableName=[Structure].Phyllochron.Value()
            LinearInterpolationFunction: XProperty=[Leaf].CohortParameters.MaxArea.Value()
              XYPairs: X=[0, 2000, 4500, 6000]; Y=[1, 2, 3, 4]
            LinearInterpolationFunction AgeFactor: XProperty=[Phenology].Stage
              XYPairs: X=[2, 4, 9, 11]; Y=[2, 2, 6, 0]
              Memo
                Growth Stages and Phenology
                1 Sowing
                2 Germination
                3 Emergence
                4 VS
                5 TS
                6 FLag leaf
                7 Flowering
                8 SGF
                9 EGF
                10 HR
                11
          Constant DetachmentLagDuration: FixedValue=1000000
          Constant DetachmentDuration: FixedValue=1000000
          Constant RelativeBranchLeafSize: FixedValue=1
          LinearInterpolationFunction MaximumNConc: XProperty=[Phenology].Stage
            XYPairs: X=[3, 4, 6]; Y=[0.08, 0.05, 0.02]
          LinearInterpolationFunction CriticalNConc: XProperty=[Phenology].Stage
            XYPairs: X=[3, 4, 6]; Y=[0.07, 0.04, 0.015]
          LinearInterpolationFunction MinimumNConc: XProperty=[Phenology].Stage
            XYPairs: X=[3, 4]; Y=[0.01, 0.005]
          AddFunction DroughtInducedLagAcceleration
            Constant One: FixedValue=1
            MultiplyFunction Stress
              Constant StressResponseCoefficient: FixedValue=1
              LinearInterpolationFunction StressFactor: XProperty=[Oats].WaterSupplyDemandRatio
                XYPairs: X=[0, 0.7]; Y=[1, 0]
          AddFunction DroughtInducedSenAcceleration: same as Replacements.Oats.Leaf.CohortParameters.DroughtInducedLagAcceleration
          LinearInterpolationFunction SpecificLeafAreaMax: XProperty=[Phenology].Stage
            XYPairs: X=[4, 5]; Y=[35000, 50000]
            Memo
              Growth Stages and Phenology
              1 Sowing
              2 Germination
              3 Emergence
              4 VS
              5 TS
              6 FLag leaf
              7 Flowering
              8 SGF
              9 EGF
              10 HR
              11
          Constant SpecificLeafAreaMin: FixedValue=25000
          Constant InitialNConc: FixedValue=0
          Constant StorageFraction: FixedValue=0.5
          Constant LeafSizeShapeParameter: FixedValue=0.3
          Constant SenessingLeafRelativeSize: FixedValue=1; Units=0-1
          MultiplyFunction ShadeInducedSenescenceRate
            LinearInterpolationFunction RatePerDegDay: XProperty=[Leaf].CohortCurrentRankCoverAbove
              XYPairs: X=[0.99, 1]; Y=[0, 0]
              Memo
                1% per degree day means it takes one phyllochron for a shaded leaf to fully sceness
            VariableReference ThermalTime: VariableName=[Phenology].ThermalTime.Value()
          PhaseLookup StructuralFraction
            PhaseLookupValue VegetativeGrowth: Start=Emergence; End=StartGrainFill
              Constant: FixedValue=0.5
            PhaseLookupValue StemElongation: Start=StartGrainFill; End=Maturity
              Constant: FixedValue=0
        RUEModel Photosynthesis
          Constant RUE: FixedValue=1.5
          WeightedTemperatureFunction FT: MaximumTemperatureWeighting=1
            XYPairs: X=[0, 4, 9, 15, 40]; Y=[0, 0, 1, 1, 1]
          LinearInterpolationFunction FVPD: XProperty=[Leaf].Photosynthesis.VPD
            XYPairs: X=[0, 10, 50]; Y=[1, 1, 1]
          LinearInterpolationFunction FN: XProperty=[Leaf].Fn
            XYPairs: X=[0, 1, 1.5]; Y=[0, 1, 1]
          LinearInterpolationFunction FW: XProperty=[Leaf].Fw
            XYPairs: X=[0, 0.3, 1]; Y=[0, 1, 1]
          RUECO2Function FCO2: PhotosyntheticPathway=C3
          VariableReference RadnInt: VariableName=[Leaf].RadIntTot
        LinearInterpolationFunction FrostFraction: XProperty=[Weather].MinT
          XYPairs: X=[-1, 0]; Y=[0, 0]
        VariableReference ThermalTime: VariableName=[Phenology].ThermalTime.Value()
        MinimumFunction FRGRFunction
          VariableReference RUE_FT: VariableName=[Leaf].Photosynthesis.FT.Value()
          MinimumFunction Others
            VariableReference RUE_FN: VariableName=[Leaf].Photosynthesis.FN.Value()
            VariableReference RUE_FVPD: VariableName=[Leaf].Photosynthesis.FVPD.Value()
        BiomassRemoval BiomassRemovalDefaults
          OrganBiomassRemovalType Harvest: FractionLiveToRemove=0; FractionDeadToRemove=0; FractionLiveToResidue=0.3; FractionDeadToResidue=0.3
          OrganBiomassRemovalType Cut: FractionLiveToRemove=0.8; FractionDeadToRemove=0.8; FractionLiveToResidue=0; FractionDeadToResidue=0
          OrganBiomassRemovalType Prune: FractionLiveToRemove=0; FractionDeadToRemove=0; FractionLiveToResidue=0.6; FractionDeadToResidue=0.6
          OrganBiomassRemovalType Graze: FractionLiveToRemove=0.6; FractionDeadToRemove=0.6; FractionLiveToResidue=0.1; FractionDeadToResidue=0.1
          OrganBiomassRemovalType Thin: FractionLiveToRemove=0; FractionDeadToRemove=0; FractionLiveToResidue=0.05; FractionDeadToResidue=0.05
        Constant ExtinctionCoeff: FixedValue=0.5
        Constant StructuralFraction: FixedValue=0
        Constant DMConversionEfficiencyFunction: FixedValue=1; Units=0-1
        ApexStandard
      GenericOrgan Spike
        PopulationBasedDemandFunction DMDemandFunction
          VariableReference ThermalTime: VariableName=[Phenology].ThermalTime.Value()
          Constant ExpansionStress: FixedValue=1
          VariableReference OrganPopulation: VariableName=[Spike].HeadNumber.Value()
          Constant StartStage: FixedValue=4.5
          Constant MaximumOrganWt: FixedValue=0.2
          AddFunction GrowthDuration
            VariableReference EarlyReproductive: VariableName=[Phenology].EarlyReproductive.Target.Value()
            VariableReference GrainDevelopment: VariableName=[Phenology].GrainDevelopment.Target.Value()
        Biomass Live
        Biomass Dead
        Constant NReallocationFactor: FixedValue=0
        Constant NRetranslocationFactor: FixedValue=0.1
        Constant MaximumNConc: FixedValue=0.01
        Constant StructuralFraction: FixedValue=0.9
        Constant SenescenceRate: FixedValue=0; Units=/d
        Constant MinimumNConc: FixedValue=0.003
        MultiplyFunction HeadNumber
          Constant FertileTillers: FixedValue=1
          VariableReference StemPopulation: VariableName=[Structure].TotalStemPopn
        BiomassRemoval BiomassRemovalDefaults
          OrganBiomassRemovalType Harvest: FractionLiveToRemove=0.5; FractionDeadToRemove=0; FractionLiveToResidue=0.1; FractionDeadToResidue=0
          OrganBiomassRemovalType Cut: FractionLiveToRemove=0.8; FractionDeadToRemove=0; FractionLiveToResidue=0; FractionDeadToResidue=0
          OrganBiomassRemovalType Prune: FractionLiveToRemove=0; FractionDeadToRemove=0; FractionLiveToResidue=0.6; FractionDeadToResidue=0
          OrganBiomassRemovalType Graze: FractionLiveToRemove=0.6; FractionDeadToRemove=0; FractionLiveToResidue=0.2; FractionDeadToResidue=0
          OrganBiomassRemovalType Thin: FractionLiveToRemove=0; FractionDeadToRemove=0; FractionLiveToResidue=0.05; FractionDeadToResidue=0
        PhaseBasedSwitch NitrogenDemandSwitch: Start=Emergence; End=StartGrainFill
        PhaseLookup DMRetranslocationFactor
          PhaseLookupValue VegetativeGrowth: Start=Emergence; End=StartGrainFill
            Constant DMRetranslocationFactor: FixedValue=0
          PhaseLookupValue ReproductiveGrowth: Start=StartGrainFill; End=EndGrainFill
            Constant DMRetranslocationFactor: FixedValue=0.5
        Constant InitialWtFunction: FixedValue=0; Units=g/m^2
        Constant DetachmentRateFunction: FixedValue=0; Units=/d
        Constant MaintenanceRespirationFunction: FixedValue=0; Units=0-1
        Constant DMConversionEfficiency: FixedValue=1; Units=0-1
        Constant DMReallocationFactor: FixedValue=0
        VariableReference CriticalNConc: VariableName=[Spike].MinimumNConc.Value()
      GenericOrgan Stem
        Memo
          The stem model  currently uses  a partition model to determine amount allocated

          N conc values are from Zhao et al 2009
        Biomass Live
        Biomass Dead
        PhaseLookup StructuralFraction
          PhaseLookupValue VegetativeGrowth: Start=Sowing; End=FlagLeaf
            Constant Fraction: FixedValue=0.7
          PhaseLookupValue ReproductiveGrowth: Start=FlagLeaf; End=Flowering
            Constant Fraction: FixedValue=0.7
          PhaseLookupValue GrainFilling: Start=Flowering; End=EndGrainFill
            Constant Fraction: FixedValue=1
          PhaseLookupValue EndStemGrowth: Start=EndGrainFill; End=Maturity
            Constant Fraction: FixedValue=1
        Constant SenescenceRate: FixedValue=0; Units=/d
        LinearInterpolationFunction MaximumNConc: XProperty=[Phenology].Stage
          XYPairs: X=[3, 4, 5, 6]; Y=[0.045, 0.045, 0.045, 0.045]
        LinearInterpolationFunction MinimumNConc: XProperty=[Phenology].Stage
          XYPairs: X=[3, 4, 6]; Y=[0.0025, 0.0025, 0.0025]
        PhaseBasedSwitch NitrogenDemandSwitch: Start=Emergence; End=StartGrainFill
        Constant NReallocationFactor: FixedValue=0
        PhaseLookup NRetranslocationFactor
          PhaseLookupValue VegetativeGrowth: Start=Sowing; End=Flowering
            Constant Fraction: FixedValue=0
          PhaseLookupValue ReproductiveGrowth: Start=Flowering; End=HarvestRipe
            Constant Fraction: FixedValue=0.5
        PhaseLookup DMRetranslocationFactor: same as Replacements.Oats.Spike.DMRetranslocationFactor
        PartitionFractionDemandFunction DMDemandFunction
          PhaseLookup PartitionFraction
            PhaseLookupValue PreStemElongation: Start=Emergence; End=TerminalSpikelet
              Constant StemFraction: FixedValue=0.4
            PhaseLookupValue StemElongation: Start=TerminalSpikelet; End=FlagLeaf
              Constant StemFraction: FixedValue=0.6
            PhaseLookupValue EarEmergence: Start=FlagLeaf; End=Flowering
              Constant StemFraction: FixedValue=0.4
            PhaseLookupValue PostEarEmergence: Start=Flowering; End=StartGrainFill
              Constant StemFraction: FixedValue=0.4
              SubtractFunction
                Constant: FixedValue=0
            PhaseLookupValue BGF: Start=StartGrainFill; End=EndGrainFill
              Constant StemFraction: FixedValue=0.1
              SubtractFunction
                Constant: FixedValue=0
            PhaseLookupValue PostGrainFill: Start=EndGrainFill; End=HarvestRipe
              Constant One: FixedValue=0
              VariableReference: VariableName=[Grain].PartitionFraction.Value()
        BiomassRemoval BiomassRemovalDefaults: same as Replacements.Oats.Spike.BiomassRemovalDefaults
        DivideFunction PercentWSC
          VariableReference WSC: VariableName=[Stem].Live.StorageWt
          VariableReference StemWt: VariableName=[Stem].Live.Wt
        Constant InitialWtFunction: FixedValue=0; Units=g/m^2
        Constant DetachmentRateFunction: FixedValue=0; Units=/d
        Constant MaintenanceRespirationFunction: FixedValue=0; Units=0-1
        Constant DMConversionEfficiency: FixedValue=1; Units=0-1
        Constant DMReallocationFactor: FixedValue=0
        VariableReference CriticalNConc: VariableName=[Stem].MinimumNConc.Value()
      CompositeBiomass AboveGround
        Propertys=[[Leaf].Live, [Leaf].Dead, [Stem].Live, [Stem].Dead, [Spike].Live, [Spike].Dead, [Grain].Live, [Grain].Dead]
      CompositeBiomass AboveGroundLive: Propertys=[[Leaf].Live, [Stem].Live, [Spike].Live, [Grain].Live]
      CompositeBiomass AboveGroundDead: Propertys=[[Leaf].Dead, [Stem].Dead, [Spike].Dead, [Grain].Dead]
      CompositeBiomass BelowGround: Propertys=[[Root].Live, [Root].Dead]
      CompositeBiomass Total
        Propertys=[[Leaf].Live, [Leaf].Dead, [Stem].Live, [Stem].Dead, [Root].Live, [Root].Dead, [Spike].Live, [Spike].Dead, [Grain].Live, [Grain].Dead]
      CompositeBiomass TotalLive
        Propertys=[[Leaf].Live, [Stem].Live, [Root].Live, [Spike].Live, [Grain].Live]
      CompositeBiomass TotalDead
        Propertys=[[Leaf].Dead, [Stem].Dead, [Root].Dead, [Spike].Dead, [Grain].Dead]
      CompositeBiomass Ear: Propertys=[[Spike].Live, [Grain].Live, [Spike].Dead, [Grain].Dead]
        Memo
          The Ear composite biomass object includes the Live and dead pools of all organs within the Ear to allow output for total dry matter and Nutrient contents, including total structural, non-structural and metabolic pools.
      CompositeBiomass StemPlusSpike: Propertys=[[Stem].Live, [Spike].Live, [Stem].Dead, [Spike].Dead]
      CultivarFolder Cultivars
        Cultivar Drummond
          Command:
            [Phenology].MinimumLeafNumber.FixedValue = 9
            [Phenology].VrnSensitivity.FixedValue = 7
            [Phenology].PpSensitivity.FixedValue = 3
            [Structure].BasePhyllochron.FixedValue = 80
        Cultivar Milton
          Command:
            [Phenology].MinimumLeafNumber.FixedValue = 9
            [Phenology].VrnSensitivity.FixedValue = 7
            [Phenology].PpSensitivity.FixedValue = 3
            [Structure].BasePhyllochron.FixedValue = 100
        Cultivar Hokunui
          Command:
            [Phenology].MinimumLeafNumber.FixedValue = 9
            [Phenology].VrnSensitivity.FixedValue = 7
            [Phenology].PpSensitivity.FixedValue = 3
            [Structure].BasePhyllochron.FixedValue = 82
            [Structure].PPSlope.FixedValue = 0.4
        Cultivar Stampede
          Command:
            [Phenology].MinimumLeafNumber.FixedValue = 9
            [Phenology].VrnSensitivity.FixedValue = 7
            [Phenology].PpSensitivity.FixedValue = 3
            [Structure].BasePhyllochron.FixedValue = 82
            [Structure].PPSlope.FixedValue = 0.4
        Cultivar Milton1
          Command:
            [Phenology].MinimumLeafNumber.FixedValue = 15
            [Phenology].VrnSensitivity.FixedValue = 7
            [Phenology].PpSensitivity.FixedValue = 3
            [Structure].MaxLN.FixedValue = 15
            [Structure].BasePhyllochron.FixedValue = 70
    Plant FodderBeet: CropType=FodderBeet
      Cultivar Rivage
      OrganArbitrator Arbitrator
        Memo
          The partitioning of biomass to fodder beet organs follows a "Relative Allocation" routine (see Arbitrator module documentation) guided by coefficients derived from the October sowing date data of the test dataset
        RelativeAllocation NArbitrator
        RelativeAllocation DMArbitrator
      Phenology: DaysAfterSowing=0
        Memo
          The fodder beet model is described for growth and dry matter production using solar radiation and temperature
          as driving functions. The effect of temperature is quantified using a thermal-time accumulation function.
          Thermal-time is calculated in degree days for ambient temperature above a base temperature (Tbase). Tbase is
          assumed to be 0°C (Chakwizira et al., 2016).
        MultiplyFunction ThermalTime
          PhaseLookup
            PhaseLookupValue SoilTemperature: Start=Sowing; End=Germination
              SoilTemperatureFunction ThermalTime: maxt_soil_surface=20; mint_soil_surface=10
                XYPairs: X=[0, 25, 30, 45]; Y=[0, 25, 25, 0]
              Memo
                The effect of soil temperature can go beyond germination as has been demonstrated in previous studies
                (e.g. Stone et al. 1998).
            PhaseLookupValue AirTemperature: Start=Germination; End=Maturity
              AirTemperatureFunction ThermalTime
                XYPairs: X=[0, 25, 30, 45]; Y=[0, 25, 25, 0]
          AddFunction DroughtPhenologyAcelleration
            Constant One: FixedValue=1
            MultiplyFunction Stress
              Constant StressResponseCoefficient: FixedValue=2
              LinearInterpolationFunction StressFactor: XProperty=[FodderBeet].WaterSupplyDemandRatio
                XYPairs: X=[0, 1]; Y=[0, 0]
        GerminatingPhase Planted: Start=Sowing; End=Germination
        EmergingPhase Germinating: Start=Germination; End=PreEmerge; ShootLag=0; ShootRate=12.5
          VariableReference ThermalTime: VariableName=[Phenology].ThermalTime.Value()
          Memo
            This is an empirical fit where 12.5°Cd per mm sowing depth is assumed based on Experiment 4 results.
        GenericPhase Emerging: Start=PreEmerge; End=Established
          Constant Target: FixedValue=400; Units=oCd
          VariableReference ThermalTime: VariableName=[Phenology].ThermalTime.Value()
          Memo
            This an empirical fit - 400°Cd estimated from Experiment 4 (October sowing date) dataset.
        GenericPhase Vegetative: Start=Established; End=InitRepro
          VariableReference ThermalTime: VariableName=[Phenology].ThermalTime.Value()
          MultiplyFunction Target
            LinearInterpolationFunction PhotoPeriodResponse: XProperty=[Phenology].Photoperiod.Value()
              XYPairs: X=[13, 16]; Y=[1, 1]
            Constant MaxThermalTimeToBolt: FixedValue=3200; Units=oCd
            Memo
              The effect of photoperiod is currently assumed neglible. The maximum TT of 3200 oCd for the October sowing
              date of Experiment 4 is assumed here.
        GenericPhase Bolt: Start=InitRepro; End=StartBolt
          VariableReference ThermalTime: VariableName=[Phenology].ThermalTime.Value()
          Constant Target: FixedValue=800
          Memo
            The 800°Cd is is an empirical fit based on Experiment 4 results.
        EndPhase Maturity: Start=Bolting; End=Maturity
          Constant Target: FixedValue=15000
          VariableReference ThermalTime: VariableName=[Phenology].ThermalTime.Value()
          Memo
            This is estimated to be 3600°Cd
        AccumulateFunction AccumulatedThermalTime: StartStageName=PreEmerge; EndStageName=Maturity; FractionRemovedOnCut=0; FractionRemovedOnHarvest=0; FractionRemovedOnGraze=0; FractionRemovedOnPrune=0
          VariableReference: VariableName=[Phenology].ThermalTime.Value()
        PhotoperiodFunction Photoperiod: Twilight=-6; DayLength=0
      Structure: Initialised=false; Germinated=false; Emerged=false; CohortToInitialise=0; TipToAppear=0; ApexNum=0
        VariableReference ThermalTime: VariableName=[Phenology].ThermalTime.Value()
        LinearInterpolationFunction HeightModel: XProperty=[Structure].LeafTipsAppeared
          XYPairs: X=[0, 24]; Y=[20, 500]
          Memo
            It is assumed that fodder beet can grow up to a maximum height of 500 mm.
        PhaseLookupValue MainStemPrimordiaInitiationRate: Start=PreEmerge; End=Maturity
          DivideFunction NodeInitiationRateFunction
            VariableReference Phyllochron: VariableName=[Structure].Phyllochron.Phyllochron.Value()
            Constant PrimordiaPerMainstemNode: FixedValue=2
          Memo
            Assumes that leaf primordia is produced at 2 times faster than the leaves (i.e. half of phyllochron values) following findings for other species such as maize (Padilla & Otegui, 2005).
        PhaseLookupValue Phyllochron: Start=PreEmerge; End=Maturity
          LinearInterpolationFunction Phyllochron: XProperty=[FodderBeet].Structure.LeafTipsAppeared
            XYPairs: X=[1, 3, 3.1]; Y=[100, 100, 50]
          Memo
            A two stage phyllochron (i.e. 100–50°Cd) is an empirical fit to get faster leaf appearance of the first 3 leaves. The
            50°Cd for the fourth and later-formed leaves is estimated from measured values of the 2014-2015 October sowing date treatment.
        Constant FinalLeafNumber: FixedValue=80
        Constant DroughtInducedBranchMortality: FixedValue=0
        Constant BranchingRate: FixedValue=0
        Constant BranchMortality: FixedValue=0
        Constant StemSenescenceAge: FixedValue=0
      Leaf: MaxCover=1; Albedo=0.2; Gsmax=0.015; R50=150; MicroClimatePresent=true; KDead=0.2
        zero: GrowthRespiration, MaintenanceRespiration, CurrentExpandingLeaf, StartFractionExpanded, FractionNextleafExpanded, DeadNodesYesterday, FRGR, PotentialEP, MaximumMainStemLeafNumber, DMConversionEfficiency, TipsAtEmergence, CohortsAtInitialisation, FractionDied
        LeafCohort InitialLeaves[1]: Rank=1; Area=50
          zero: NReallocationFactor, DMReallocationFactor, NRetranslocationFactor, DMRetranslocationFactor, ShadeInducedSenRate, SenescedFrac, DeltaPotentialArea, DeltaWaterConstrainedArea, DeltaCarbonConstrainedArea, PotentialStructuralDMAllocation, PotentialMetabolicDMAllocation, MetabolicNReallocated, MetabolicWtReallocated, StorageNReallocated, StorageWtReallocated, MetabolicNRetranslocated, StorageNRetrasnlocated, DMRetranslocated, MetabolicNAllocation, StructuralDMAllocation, MetabolicDMAllocation, MaintenanceRespiration
        CompositeBiomass Live: Propertys=[[Leaf].CohortLive]
        CompositeBiomass Dead: Propertys=[[Leaf].CohortDead]
        CompositeBiomass Total: Propertys=[[Leaf].CohortLive, [Leaf].CohortDead]
        ArrayBiomass CohortArrayLive: Propertys=[[Leaf].Live]; ArraySize=[Leaf].MaxNodeNo
        ArrayBiomass CohortArrayDead: Propertys=[[Leaf].Dead]; ArraySize=[Leaf].MaxNodeNo
        VariableReference ThermalTime: VariableName=[Phenology].ThermalTime.Value()
        RUEModel Photosynthesis
          Constant RUE: FixedValue=1.4
          Constant FN: FixedValue=1
          Constant FVPD: FixedValue=1
          WeightedTemperatureFunction FT: MaximumTemperatureWeighting=0.75
            XYPairs: X=[0, 18, 26, 45]; Y=[0.1, 1, 1, 0.1]
          LinearInterpolationFunction FW: XProperty=[Leaf].Fw
            XYPairs: X=[0, 0.4, 1.5]; Y=[0, 1, 1]
          RUECO2Function FCO2: PhotosyntheticPathway=C3
          VariableReference RadnInt: VariableName=[Leaf].RadIntTot
          VariableReference RUEact: VariableName=[RUEModel].RueAct
        LinearInterpolationFunction FrostFraction: XProperty=[Weather].MinT
          XYPairs: X=[-1, 0]; Y=[0, 0]
        MultiplyFunction ExtinctionCoeff
          Constant PotentialExtinctionCoeff: FixedValue=0.74
          LinearInterpolationFunction WaterStress: XProperty=[FodderBeet].WaterSupplyDemandRatio
            XYPairs: X=[0, 1]; Y=[0.5, 1]
        LeafCohortParameters CohortParameters
          Constant SenessingLeafRelativeSize: FixedValue=1; Units=0-1
          LinearInterpolationFunction MaxArea: XProperty=[Structure].LeafTipsAppeared
            XYPairs: X=[1, 6, 11, 15, 21, 35, 45, 50]; Y=[8000, 10000, 40000, 50000, 50000, 50000, 50000, 50000]
            Memo
              Data of expansion of  laminae at three leaf positions ( twelfth, sixteenth and twentieth) on six plants  from the sowing date  experiment were used to give indication of ontogenic increase in maximum leaf area. The pattern of maximum leaf area for sugar beet (Milford et al. 1985) was assumed.
          LinearInterpolationFunction GrowthDuration: XProperty=[Structure].LeafTipsAppeared
            XYPairs: X=[1, 6, 11, 15, 21, 35, 45, 50]; Y=[200, 300, 500, 500, 500, 400, 300, 200]
            Memo
              The pattern is assumed to be similar to that of maize (Teixeira et al 2011).
          MultiplyFunction LagDuration
            LinearInterpolationFunction PhotoperiodMultiplier: XProperty=[Phenology].Photoperiod.Value()
              XYPairs: X=[1, 10, 13, 24]; Y=[0, 0, 1, 1]
              Memo
                The pattern is assumed to be similar to that of maize (Teixeira et al 2011).
            LinearInterpolationFunction LagDurationBase: XProperty=[Structure].LeafTipsAppeared
              XYPairs: X=[1, 6, 11, 15, 21, 35, 45, 50]; Y=[100, 200, 300, 300, 300, 200, 100, 80]
            Memo
              The pattern is assumed to be similar to that of maize (Teixeira et al 2011).
          MultiplyFunction SenescenceDuration
            LinearInterpolationFunction PhotoperiodMultiplier: XProperty=[Phenology].Photoperiod.Value()
              XYPairs: X=[1, 10, 13, 24]; Y=[1, 1, 1, 1]
              Constant BaseValue: FixedValue=600; Units=oCd
            Constant BaseValue: FixedValue=600; Units=oCd
          Constant DetachmentLagDuration: FixedValue=1000000
          Constant DetachmentDuration: FixedValue=1
          Constant StructuralFraction: FixedValue=0.5
          Constant SpecificLeafAreaMin: FixedValue=14000
          Constant SpecificLeafAreaMax: FixedValue=16000
            Memo
              Maximum leaf specific leaf area was estimated from the October sowing date of Experiment 4
          LinearInterpolationFunction ExpansionStress: XProperty=[FodderBeet].WaterSupplyDemandRatio
            XYPairs: X=[0.5, 1]; Y=[0, 1]
          Constant MinimumNConc: FixedValue=0.025
          Constant CriticalNConc: FixedValue=0.025
          Constant MaximumNConc: FixedValue=0.05
          Constant NReallocationFactor: FixedValue=0.95
          Constant NRetranslocationFactor: FixedValue=0.01
          Constant DMRetranslocationFactor: FixedValue=0.95
          Constant DMReallocationFactor: FixedValue=0.95
          Constant StorageFraction: FixedValue=0.2
          LinearInterpolationFunction ShadeInducedSenescenceRate: XProperty=[Leaf].CohortCurrentRankCoverAbove
            XYPairs: X=[0, 0.5, 0.95, 1]; Y=[0, 0, 0, 0.1]
          Constant InitialNConc: FixedValue=0
          Constant LeafSizeShapeParameter: FixedValue=0.01
          Constant MaintenanceRespirationFunction: FixedValue=0
          Constant DroughtInducedSenAcceleration: FixedValue=1
          Constant CellDivisionStressConst: FixedValue=1; Units=0-1
          Constant DroughtInducedLagAcceleration: FixedValue=1
          LinearInterpolationFunction CellDivisionStress: XProperty=[Leaf].Live.NConc
            XYPairs: X=[0.02, 0.05]; Y=[0, 1]
        MinimumFunction FRGRFunction: same as Replacements.Oats.Leaf.FRGRFunction
        BiomassRemoval BiomassRemovalDefaults
          OrganBiomassRemovalType Harvest: FractionLiveToRemove=0.5; FractionDeadToRemove=0; FractionLiveToResidue=0.1; FractionDeadToResidue=0
          OrganBiomassRemovalType Cut: FractionLiveToRemove=0.8; FractionDeadToRemove=0; FractionLiveToResidue=0; FractionDeadToResidue=0
          OrganBiomassRemovalType Prune: FractionLiveToRemove=0; FractionDeadToRemove=0; FractionLiveToResidue=0.6; FractionDeadToResidue=0
          OrganBiomassRemovalType Graze: FractionLiveToRemove=0.6; FractionDeadToRemove=0; FractionLiveToResidue=0.2; FractionDeadToResidue=0
        Constant StructuralFraction: FixedValue=0.5
        Constant DMConversionEfficiencyFunction: FixedValue=1
        ApexStandard
      Root: GrowthRespiration=0; MaintenanceRespiration=0
        LinearInterpolationFunction KLModifier: XProperty=[Root].LengthDensity
          XYPairs: X=[0, 1]; Y=[1, 1]
        Constant SoilWaterEffect: FixedValue=1
        Constant MaximumRootDepth: FixedValue=1000000
        PhaseLookup RootFrontVelocity
          PhaseLookupValue: Start=Germination; End=Maturity
            Constant: FixedValue=10
        Constant MaximumNConc: FixedValue=0.01
        Constant MinimumNConc: FixedValue=0.005
        PhaseBasedSwitch NitrogenDemandSwitch: Start=PreEmerge; End=Maturity
        LinearInterpolationFunction SenescenceRate: XProperty=[Leaf].FractionDied
          XYPairs: X=[0, 1]; Y=[0, 0.001]
        CompositeBiomass Live: Propertys=[[Root].LayerLive]
        CompositeBiomass Dead: Propertys=[[Root].LayerDead]
        Constant StructuralFraction: FixedValue=1
        BiomassRemoval BiomassRemovalDefaults: same as Replacements.FodderBeet.Leaf.BiomassRemovalDefaults
        LinearInterpolationFunction KNO3: XProperty=[Root].LengthDensity
          XYPairs: X=[0, 0.003]; Y=[0.02, 0.02]
        LinearInterpolationFunction KNH4: XProperty=[Root].LengthDensity
          XYPairs: X=[0, 0.003]; Y=[0, 0]
        LinearInterpolationFunction NUptakeSWFactor: XProperty=[Root].RWC
          XYPairs: X=[0, 1]; Y=[0, 1]
        Constant InitialDM: FixedValue=5; Units=g/plant
        Constant SpecificRootLength: FixedValue=40; Units=m/g
        LinearInterpolationFunction MaxDailyNUptake: XProperty=[Root].Depth
          XYPairs: X=[0, 100, 250, 500, 750, 1000, 1250, 1500, 1750]; Y=[0.1, 1, 3, 7.5, 7.5, 7.5, 7.5, 7.5, 7.5]
          Memo
            Early growth N uptake is assumed to be 0.1 kg N/ha/day, and this increases with root growth reaching a maximumof 5.8 kg N/ha/day. The maximum N uptake per day is assumed from sugar beet data (Armstrong et al., 1986).
        PartitionFractionDemandFunction DMDemandFunction
          Constant PartitionFraction: FixedValue=0.05
      GenericOrgan StorageRoot
        Constant StructuralFraction: FixedValue=0.95
        Constant SenescenceRate: FixedValue=0; Units=/d
        Constant MaximumNConc: FixedValue=0.03
        Constant MinimumNConc: FixedValue=0.005
        Constant NReallocationFactor: FixedValue=0.05
        PhaseBasedSwitch NitrogenDemandSwitch: Start=Germination; End=Maturity
        Constant NRetranslocationFactor: FixedValue=0.05
        Constant DMRetranslocationFactor: FixedValue=0.05
        Biomass Live
        Biomass Dead
        Constant DMSinkCapacity: FixedValue=1
        PartitionFractionDemandFunction DMDemandFunction
          LinearInterpolationFunction PartitionFraction: XProperty=[Structure].LeafTipsAppeared
            XYPairs: X=[1, 6, 15, 30, 51]; Y=[0.1, 0.35, 0.7, 0.8, 0.8]
            Memo
              Allocation determined by node number - partitioning coefficients have been determined using the sowing date October data
        Constant InitialWtFunction: FixedValue=0; Units=g/m^2
        Constant DetachmentRateFunction: FixedValue=0; Units=/d
        Constant MaintenanceRespirationFunction: FixedValue=0; Units=0-1
        Constant DMConversionEfficiency: FixedValue=1; Units=0-1
        BiomassRemoval BiomassRemovalDefaults: same as Replacements.FodderBeet.Leaf.BiomassRemovalDefaults
        Constant DMReallocationFactor: FixedValue=0
        VariableReference CriticalNConc: VariableName=[StorageRoot].MinimumNConc.Value()
      GenericOrgan Petiole
        Constant StructuralFraction: FixedValue=0.95
        Constant MaximumNConc: FixedValue=0.04
        Constant MinimumNConc: FixedValue=0.01
        PhaseBasedSwitch NitrogenDemandSwitch: Start=Germination; End=Maturity
        Constant NRetranslocationFactor: FixedValue=0.1
        Constant DMRetranslocationFactor: FixedValue=0.05
        Biomass Live
        Biomass Dead
        PartitionFractionDemandFunction DMDemandFunction
          LinearInterpolationFunction PartitionFraction: XProperty=[Structure].LeafTipsAppeared
            XYPairs: X=[1, 6, 15, 30, 51]; Y=[0.1, 0.15, 0.24, 0.15, 0.1]
            Memo
              Allocation determined by node number - partitioning coefficients have been determined using the sowing date October data
        VariableReference SenescenceRate: VariableName=[Leaf].FractionDied
        Constant DMReallocationFactor: FixedValue=0
        Constant NReallocationFactor: FixedValue=0.94
        Constant InitialWtFunction: FixedValue=0; Units=g/m^2
        Constant DetachmentRateFunction: FixedValue=0; Units=/d
        Constant MaintenanceRespirationFunction: FixedValue=0; Units=0-1
        Constant DMConversionEfficiency: FixedValue=1; Units=0-1
        BiomassRemoval BiomassRemovalDefaults: same as Replacements.FodderBeet.Leaf.BiomassRemovalDefaults
        VariableReference CriticalNConc: VariableName=[Petiole].MinimumNConc.Value()
      CompositeBiomass AboveGround
        Propertys=[[Leaf].Live, [Leaf].Dead, [StorageRoot].Live, [StorageRoot].Dead, [Petiole].Live, [Petiole].Dead]
      CompositeBiomass BelowGround: Propertys=[[Root].Live, [Root].Dead]
      CompositeBiomass Total
        Propertys=[[Leaf].Live, [Leaf].Dead, [StorageRoot].Live, [StorageRoot].Dead, [Petiole].Live, [Petiole].Dead, [Root].Live, [Root].Dead]
      CompositeBiomass TotalLive
        Propertys=[[Leaf].Live, [Petiole].Live, [StorageRoot].Live, [Root].Live]
      CompositeBiomass TotalDead
        Propertys=[[Leaf].Dead, [Petiole].Dead, [StorageRoot].Dead, [Root].Dead]
      LinearInterpolationFunction MortalityRate: XProperty=[Leaf].CoverGreen
        XYPairs: X=[0.98, 1]; Y=[0, 1]
  DataStore
    ExcelInput RS_Obs: FileName=RSData.xlsx; SheetNames=[OBS]
    ExcelInput VWC: FileName=VWC_APSIM.xlsx; SheetNames=[VWC_OBS]
    ExcelInput SoilTemp: FileName=MeanSoilTemp.xlsx; SheetNames=[MeanTemp]
  Experiment RS_Rotation
    Factors
      Factor Nit
        Factor 0
          Specifications:
            [Fert]
            [StateFactors].Script.NitFactor = 0
          Operations 0
            2016-10-29  [Fertiliser].Apply(0, Fertiliser.Types.NO3N, 10);
            2017-01-18  [Fertiliser].Apply(0, Fertiliser.Types.NO3N, 10);
            2017-02-25  [Fertiliser].Apply(0, Fertiliser.Types.NO3N, 10);
            Memo
              Uniques fertigation event
        Factor 50
          Specifications:
            [Fert]
            [StateFactors].Script.NitFactor = 50
          Operations 50
            2016-10-29  [Fertiliser].Apply(25, Fertiliser.Types.NO3N, 10);
            2017-01-18  [Fertiliser].Apply(25, Fertiliser.Types.NO3N, 10);
            2017-02-25  [Fertiliser].Apply(0, Fertiliser.Types.NO3N, 10);
        Factor 300
          Specifications:
            [Fert]
            [StateFactors].Script.NitFactor = 300
          Operations 300
            2016-10-29  [Fertiliser].Apply(100, Fertiliser.Types.NO3N, 10);
            2017-01-18  [Fertiliser].Apply(100, Fertiliser.Types.NO3N, 10);
            2017-02-25  [Fertiliser].Apply(100, Fertiliser.Types.NO3N, 10);
      Factor Irr
        Factor Full
          Specifications:
            [Irrig]
            [StateFactors].Script.IrrFactor = true
          Operations Full
            2016-09-02  [Irrigation].Apply(25);
            2016-10-25  [Irrigation].Apply(5);
            2016-10-28  [Irrigation].Apply(5);
            2016-11-17  [Irrigation].Apply(5);
            2016-11-23  [Irrigation].Apply(30);
            2016-11-30  [Irrigation].Apply(0);
            2016-12-07  [Irrigation].Apply(25);
            2016-12-21  [Irrigation].Apply(25);
            2016-12-29  [Irrigation].Apply(30);
            2017-01-04  [Irrigation].Apply(40);
            2017-01-11  [Irrigation].Apply(32.9);
            2017-01-18  [Irrigation].Apply(25.4);
            2017-01-25  [Irrigation].Apply(31.3);
            2017-02-08  [Irrigation].Apply(33);
            2017-02-15  [Irrigation].Apply(35);
            2017-02-22  [Irrigation].Apply(29);
            2017-02-15  [Irrigation].Apply(35);
            2017-02-22  [Irrigation].Apply(29);
            2017-03-01  [Irrigation].Apply(32.6);
            2017-03-08  [Irrigation].Apply(34);
            2017-03-15  [Irrigation].Apply(0);
            2017-03-22  [Irrigation].Apply(50);
            2017-03-29  [Irrigation].Apply(0);
            2017-04-05  [Irrigation].Apply(0);
            2017-04-12  [Irrigation].Apply(30.9);
            2017-04-27  [Irrigation].Apply(18.9);
            Memo
              Have added an extra irrigation, on 22 Oct,

              Data indcates water applied but no notes of it RFZ

              In Statefactors have donethe irrigations for
                17/12  21/1 19/11 14/1
        Factor Nil
          Specifications:
            [Irrig]
            [StateFactors].Script.IrrFactor = false
          Operations Nil
            2016-09-02  [Irrigation].Apply(20)
            2016-10-25  [Irrigation].Apply(5)
            2017-01-18  [Irrigation].Apply(5)
            2017-02-25  [Irrigation].Apply(5)
            2017-05-21  [Irrigation].Apply(50)
            Memo
              Have added an extra irrigation, on 3 Nov,

              Data indcates water applied but no notes of it RFZ
    Simulation Rainshelter
      Clock: StartDate=2016-09-28; EndDate=2017-12-01
      Summary summaryfile
      Weather: FileName=lincolnPred.met
      SoilArbitrator Soil Arbitrator
      Zone paddock: Area=1; Slope=0
        Folder Manager folder
          Operations
            2016-10-18  [FodderBeet].Sow(population:11, cultivar:"Rivage", depth:15, rowSpacing:450)
            2017-05-30  [FodderBeet].Harvest()
            2017-05-30  [FodderBeet].EndCrop()
            2017-07-05  [Oats].Sow(population:300, cultivar:"Milton1", depth:15, rowSpacing:45)
          Operations Irrig
          Operations Fert
            2016-10-29  [Fertiliser].Apply(100, Fertiliser.Types.UreaN, 10);
            2017-01-18  [Fertiliser].Apply(100, Fertiliser.Types.UreaN, 10);
            2017-02-25  [Fertiliser].Apply(100, Fertiliser.Types.UreaN, 10);
          Operations Testing
        Irrigation
        SurfaceOrganicMatter Surface Organic Matter: PoolName=wheat_stubble; type=wheat; mass=1500; standing_fraction=0; cnr=80; CriticalResidueWeight=2000; OptimumDecompTemp=20; MaxCumulativeEOS=20; CNRatioDecompCoeff=0.277; CNRatioDecompThreshold=25; TotalLeachRain=25; MinRainToLeach=10; CriticalMinimumOrganicC=0.004; DefaultCPRatio=0; DefaultStandingFraction=0; StandingExtinctCoeff=0.5; FractionFaecesAdded=0.5
          Pools:
            {PoolName=wheat_stubble, ResidueType=wheat, Mass=1500, CNRatio=80, StandingFraction=0}
          ResidueTypes: LoadFromResource=ResidueTypes
        Fertiliser
        MicroClimate: a_interception=0; b_interception=1; c_interception=0; d_interception=0; soil_albedo=0.3; sun_angle=15; soil_heat_flux_fraction=0.4; night_interception_fraction=0.5; refheight=2; albedo=0.293662; emissivity=0.96; RadIntTotal=0
        Plant Oats: CropType=Oats
        Report HarvestReport
        Manager Harvesting
```csharp
using System;
using Models.Core;
using System.Collections.Generic;
using System.Text;
using Models.Soils;
using Models.PMF;
using Models;
using System.Xml.Serialization;
using APSIM.Shared.Utilities;

namespace Models
{
	[Serializable] 
	public class Script : Model
	{
		[Link] Plant Oats;
		[Link] Plant FodderBeet;
		[Link] Clock clock;
		[EventSubscribe("DoManagement")]
		private void OnDoManagement(object sender, EventArgs e)
		{
			if (Oats.IsAlive == true)
			{	
				DateTime HD = new DateTime(2017, 11, 01);
				if (clock.Today.Date == HD.Date)
				{
					Oats.Harvest();
					Oats.EndCrop();
				}
			}
			if (FodderBeet.IsAlive == true)
			{	
				DateTime HD = new DateTime(2017, 05, 01);
				if (clock.Today.Date == HD.Date)
				{
					FodderBeet.Harvest();
					FodderBeet.EndCrop();
				}
			}
		}
	}
}
```
        Manager ClimateControl
          StartDate = 2016-10-17
          EndDate = 2017-05-20
```csharp
using System;
using Models.Core;
using APSIM.Shared.Utilities;



using System.Collections.Generic;
using System.Text;
using Models.PMF;
using Models;
using System.Xml.Serialization;

namespace Models
{
	[Serializable] 
	[System.Xml.Serialization.XmlInclude(typeof(Model))]
	public class Script : Model
	{
		[Link] Weather Met;
		[Link] Clock Clock;
    
		[Description("Start Date")]
		public DateTime StartDate { get; set; }
        
		[Description("End Date")]
		public DateTime EndDate { get; set; }
 
    
		[EventSubscribe("PreparingNewWeatherData")]
		private void OnPreparingNewWeatherData(object sender, EventArgs e)
		{
			if ((Clock.Today.Date >= StartDate) && (Clock.Today.Date <= EndDate))
				Met.Rain = 0;		
		}
	}
}
```
        Report EnviroReport: EventNames=[Clock].DoReport
          VariableNames:
            [Clock].Today
            [Weather].MeanT
            [Weather].Radn
            [FodderBeet].WaterSupplyDemandRatio
            ([FodderBeet].Leaf.Transpiration + [Soil].SoilWater.Es + [MicroClimate].interception) as ET
            ([FodderBeet].Leaf.Transpiration) as Transpiration
            ([Soil].SoilNitrogen.MineralisedN[1]) as MineralizedN
            ([Soil].SoilWater.LeachNO3) as NLeached
            [Paddock].Irrigation.IrrigationApplied
            [Paddock].Fertiliser.NitrogenApplied
        SoluteManager
        Plant FodderBeet
        Report DailyReport: EventNames=[Clock].DoReport
          VariableNames:
            [Clock].Today
            [Weather].MeanT
            [Soil].SoilWater.SW
            [Soil].SoilWater.SWmm
            sum([Soil].SoilWater.SWmm) as ProfileWater
            [FodderBeet].AboveGround.N
            [FodderBeet].AboveGround.Wt
            [FodderBeet].AboveGroundLive.N
            [FodderBeet].AboveGroundLive.Wt
            [FodderBeet].AboveGroundDead.N
            [FodderBeet].AboveGroundDead.Wt
            [FodderBeet].Arbitrator.DMDemand
            [FodderBeet].Arbitrator.DM.TotalFixationSupply
            [FodderBeet].Leaf.AppearedCohortNo
            [FodderBeet].Leaf.CoverDead
            [FodderBeet].Leaf.CoverGreen
            [FodderBeet].Leaf.CoverTotal
            [FodderBeet].Leaf.Dead.N
            [FodderBeet].Leaf.Dead.NConc
            [FodderBeet].Leaf.Dead.Wt
            [FodderBeet].Leaf.DeadCohortNo
            [FodderBeet].Leaf.SenescingCohortNo
            [FodderBeet].Leaf.ExpandedCohortNo
            [FodderBeet].Leaf.Fn
            [FodderBeet].Leaf.Fw
            [FodderBeet].Leaf.Height
            [FodderBeet].Leaf.InitialisedCohortNo
            [FodderBeet].Leaf.LAI
            [FodderBeet].Leaf.Live.N
            [FodderBeet].Leaf.Live.NConc
            [FodderBeet].Leaf.Live.Wt
            [FodderBeet].Leaf.SpecificArea
            [FodderBeet].Leaf.Transpiration
            [FodderBeet].Phenology.CurrentPhaseName
            [FodderBeet].Phenology.CurrentStageName
            [FodderBeet].Phenology.DailyVernalisation.Value()
            [FodderBeet].Phenology.MeanTemp.Value()
            [FodderBeet].Phenology.Photoperiod.Value()
            [FodderBeet].Phenology.Stage
            [FodderBeet].Phenology.ThermalTime.Value()
            [FodderBeet].Phenology.ThermalTime.Value()
            [FodderBeet].Phenology.Vrn1.Value()
            [FodderBeet].Phenology.Vrn2.Value()
            [FodderBeet].Phenology.Vrn4.Value()
            [FodderBeet].Phenology.Zadok.Stage
            [FodderBeet].Root.Depth
            [FodderBeet].Root.N
            [FodderBeet].Root.Wt
            [FodderBeet].Root.Nconc
            [FodderBeet].Root.WaterUptake
            [FodderBeet].StorageRoot.N
            [FodderBeet].StorageRoot.NConc
            [FodderBeet].StorageRoot.Wt
            [FodderBeet].StorageRoot.Live.StorageWt
            [FodderBeet].Petiole.N
            [FodderBeet].Petiole.NConc
            [FodderBeet].Petiole.Wt
            [FodderBeet].Petiole.PercentWSC
            [FodderBeet].Petiole.Live.StorageWt
            [FodderBeet].SowingData.Cultivar
            [FodderBeet].Structure.Height
            [FodderBeet].Structure.LeafTipsAppeared
            [FodderBeet].Structure.MainStemPopn
            [FodderBeet].Structure.TotalStemPopn
            [FodderBeet].Total.N
            [FodderBeet].Total.Wt
            [SurfaceOrganicMatter].Wt
            sum([Soil].SoilNitrogen.NO3) as TotalSoilNitrogen
            [FodderBeet].Phenology.FlagLeafDAS
            [FodderBeet].Phenology.FloweringDAS
            [FodderBeet].Phenology.MaturityDAS
            [FodderBeet].Phenology.PhotoPeriod
            [FodderBeet].Phenology.PhotoPeriodDeltaFunction
            [FodderBeet].Phenology.Stage
            [FodderBeet].Phenology.SoilTemperatureFunction.Value()
            [Oats].AboveGround.N
            [Oats].AboveGround.Wt
            [Oats].AboveGroundLive.N
            [Oats].AboveGroundLive.Wt
            [Oats].AboveGroundDead.N
            [Oats].AboveGroundDead.Wt
            [Oats].Arbitrator.DMDemand
            [Oats].Arbitrator.DM.TotalFixationSupply
            [Oats].Ear.N
            [Oats].Ear.Nconc
            [Oats].Ear.Wt
            [Oats].Grain.N
            [Oats].Grain.NConc
            [Oats].Grain.Number
            [Oats].Grain.Size
            [Oats].Grain.Wt
            [Oats].Grain.Live.Wt
            [Oats].Leaf.AppearedCohortNo
            [Oats].Leaf.CoverDead
            [Oats].Leaf.CoverGreen
            [Oats].Leaf.CoverTotal
            [Oats].Leaf.Dead.N
            [Oats].Leaf.Dead.NConc
            [Oats].Leaf.Dead.Wt
            [Oats].Leaf.DeadCohortNo
            [Oats].Leaf.SenescingCohortNo
            [Oats].Leaf.ExpandedCohortNo
            [Oats].Leaf.Fn
            [Oats].Leaf.Fw
            [Oats].Leaf.Height
            [Oats].Leaf.InitialisedCohortNo
            [Oats].Leaf.LAI
            [Oats].Leaf.Live.N
            [Oats].Leaf.Live.NConc
            [Oats].Leaf.Live.Wt
            [Oats].Leaf.SpecificArea
            [Oats].Leaf.Transpiration
            [Oats].Phenology.CurrentPhaseName
            [Oats].Phenology.CurrentStageName
            [Oats].Phenology.DailyVernalisation.Value()
            [Oats].Phenology.MeanTemp.Value()
            [Oats].Phenology.Photoperiod.Value()
            [Oats].Phenology.Stage
            [Oats].Phenology.ThermalTime.Value()
            [Oats].Phenology.ThermalTime.Value()
            [Oats].Phenology.Vrn1.Value()
            [Oats].Phenology.Vrn2.Value()
            [Oats].Phenology.Vrn4.Value()
            [Oats].Phenology.Zadok.Stage
            [Oats].Root.Depth
            [Oats].Root.N
            [Oats].Root.Wt
            [Oats].Root.Nconc
            [Oats].Root.WaterUptake
            [Oats].Spike.N
            [Oats].Spike.NConc
            [Oats].Spike.Wt
            [Oats].Spike.Live.StorageWt
            [Oats].Stem.N
            [Oats].Stem.NConc
            [Oats].Stem.Wt
            [Oats].Stem.PercentWSC
            [Oats].Stem.Live.StorageWt
            [Oats].StemPlusSpike.Wt
            [Oats].StemPlusSpike.N
            [Oats].SowingData.Cultivar
            [Oats].Structure.HaunStage.Value()TerminalSpikelet.Value()
            [Oats].Structure.HaunStage.Value()
            [Oats].Structure.Height
            [Oats].Structure.LeafTipsAppeared
            [Oats].Structure.FinalLeafNumber.Value()
            [Oats].Structure.FinalLeafNumber.ValueToHold.PhotoPLeaves.Value()
            [Oats].Structure.MainStemPopn
            [Oats].Structure.MeanTillerGrowthRate.Value()
            [Oats].Structure.TotalStemPopn
            [Oats].Total.N
            [Oats].Total.Wt
            [SurfaceOrganicMatter].Wt
            ([Oats].Leaf.Transpiration + [Soil].SoilWater.Es + [MicroClimate].interception) as ET
            sum([Soil].SoilNitrogen.NO3) as TotalSoilNitrogen
            [Oats].Phenology.FlagLeafDAS
            [Oats].Phenology.FloweringDAS
            [Oats].Phenology.MaturityDAS
            [Oats].Phenology.PhotoPeriod
            [Oats].Phenology.PhotoPeriodDeltaFunction
            [Oats].Phenology.Stage
            [Oats].Phenology.SoilTemperatureFunction.Value()
        Manager StateFactors
          IrrFactor = False
          NitFactor = 0
```csharp
using System;
using Models.Core;
using System.Collections.Generic;
using System.Text;
using Models.Soils;
using Models.PMF;
using Models;
using System.Xml.Serialization;
using APSIM.Shared.Utilities;

namespace Models
{
	[Serializable] 
	public class Script : Model
	{
		[Link] Clock Clock;
		[Link] Irrigation Irrigation;
		[Link] Fertiliser Fert;
		[Link] Soil ThisSoil;
		[Description("Amount of Irrgation be applied 0/1")]
		public bool IrrFactor { get; set; }
		[Description("Amount of fertiliser to be applied (kg/ha)")]
		public double NitFactor { get; set; }
		
          
		private void SetSoilLayers()
		{
			/*
            Not used yrt use whenmore detailed info is known
            */
			int i = 0;
			if ((IrrFactor == false) && (NitFactor == 0))
			{
				if (ThisSoil.Thickness.Length != 7)
				{
					throw new Exception("Soil layer exception");
				}
			 
				ThisSoil.LL15[0] = 0.06;
				ThisSoil.LL15[1] = 0.06;
				ThisSoil.LL15[2] = 0.08;
				ThisSoil.LL15[3] = 0.14;
				ThisSoil.LL15[4] = 0.16;
				ThisSoil.LL15[5] = 0.16;
				ThisSoil.LL15[6] = 0.11;
				ThisSoil.DUL[0] = 0.34;
				ThisSoil.DUL[1] = 0.3;
				ThisSoil.DUL[2] = 0.28;
				ThisSoil.DUL[3] = 0.3;
				ThisSoil.DUL[4] = 0.3;
				ThisSoil.DUL[5] = 0.30;
				ThisSoil.DUL[6] = 0.3;
				ThisSoil.SAT[0] = 0.4;
				ThisSoil.SAT[1] = 0.4;
				ThisSoil.SAT[2] = 0.4;
				ThisSoil.SAT[3] = 0.4;
				ThisSoil.SAT[4] = 0.4;
				ThisSoil.SAT[5] = 0.4;
				ThisSoil.SAT[6] = 0.4;
				ThisSoil.SoilWater.Reset();
			}   
			if ((IrrFactor == false) && (NitFactor == 50))
			{
				if (ThisSoil.Thickness.Length != 7)
				{
					throw new Exception("Soil layer exception");
				}
			 
				ThisSoil.LL15[0] = 0.07;
				ThisSoil.LL15[1] = 0.12;
				ThisSoil.LL15[2] = 0.17;
				ThisSoil.LL15[3] = 0.20;
				ThisSoil.LL15[4] = 0.26;
				ThisSoil.LL15[5] = 0.32;
				ThisSoil.LL15[6] = 0.30;
				ThisSoil.DUL[0] = 0.30;
				ThisSoil.DUL[1] = 0.26;
				ThisSoil.DUL[2] = 0.29;
				ThisSoil.DUL[3] = 0.25;
				ThisSoil.DUL[4] = 0.29;
				ThisSoil.DUL[5] = 0.34;
				ThisSoil.DUL[6] = 0.30;
				ThisSoil.SAT[0] = 0.34;
				ThisSoil.SAT[1] = 0.34;
				ThisSoil.SAT[2] = 0.34;
				ThisSoil.SAT[3] = 0.34;
				ThisSoil.SAT[4] = 0.34;
				ThisSoil.SAT[5] = 0.34;
				ThisSoil.SAT[6] = 0.34;
				ThisSoil.SoilWater.Reset();
			}   
			if ((IrrFactor == false) && (NitFactor == 50))
			{
				if (ThisSoil.Thickness.Length != 7)
				{
					throw new Exception("Soil layer exception");
				}
			 
				ThisSoil.LL15[0] = 0.06;
				ThisSoil.LL15[1] = 0.11;
				ThisSoil.LL15[2] = 0.21;
				ThisSoil.LL15[3] = 0.18;
				ThisSoil.LL15[4] = 0.23;
				ThisSoil.LL15[5] = 0.30;
				ThisSoil.LL15[6] = 0.26;
				ThisSoil.DUL[0] = 0.25;
				ThisSoil.DUL[1] = 0.26;
				ThisSoil.DUL[2] = 0.30;
				ThisSoil.DUL[3] = 0.27;
				ThisSoil.DUL[4] = 0.34;
				ThisSoil.DUL[5] = 0.27;
				ThisSoil.DUL[6] = 0.30;
				ThisSoil.SAT[0] = 0.34;
				ThisSoil.SAT[1] = 0.34;
				ThisSoil.SAT[2] = 0.34;
				ThisSoil.SAT[3] = 0.34;
				ThisSoil.SAT[4] = 0.34;
				ThisSoil.SAT[5] = 0.34;
				ThisSoil.SAT[6] = 0.34;
				ThisSoil.SoilWater.Reset();
			}   
			if ((IrrFactor == true) && (NitFactor == 0))
			{
				if (ThisSoil.Thickness.Length != 7)
				{
					throw new Exception("Soil layer exception");
				}
			 
				ThisSoil.LL15[0] = 0.13;
				ThisSoil.LL15[1] = 0.21;
				ThisSoil.LL15[2] = 0.25;
				ThisSoil.LL15[3] = 0.19;
				ThisSoil.LL15[4] = 0.29;
				ThisSoil.LL15[5] = 0.32;
				ThisSoil.LL15[6] = 0.34;
				ThisSoil.DUL[0] = 0.31;
				ThisSoil.DUL[1] = 0.28;
				ThisSoil.DUL[2] = 0.30;
				ThisSoil.DUL[3] = 0.28;
				ThisSoil.DUL[4] = 0.29;
				ThisSoil.DUL[5] = 0.34;
				ThisSoil.DUL[6] = 0.30;
				ThisSoil.SAT[0] = 0.34;
				ThisSoil.SAT[1] = 0.34;
				ThisSoil.SAT[2] = 0.34;
				ThisSoil.SAT[3] = 0.34;
				ThisSoil.SAT[4] = 0.34;
				ThisSoil.SAT[5] = 0.34;
				ThisSoil.SAT[6] = 0.34;
				ThisSoil.SoilWater.Reset();
			}   
			if ((IrrFactor == true) && (NitFactor == 50))
			{
				if (ThisSoil.Thickness.Length != 7)
				{
					throw new Exception("Soil layer exception");
				}
			 
				ThisSoil.LL15[0] = 0.14;
				ThisSoil.LL15[1] = 0.21;
				ThisSoil.LL15[2] = 0.27;
				ThisSoil.LL15[3] = 0.27;
				ThisSoil.LL15[4] = 0.27;
				ThisSoil.LL15[5] = 0.32;
				ThisSoil.LL15[6] = 0.30;
				ThisSoil.DUL[0] = 0.31;
				ThisSoil.DUL[1] = 0.28;
				ThisSoil.DUL[2] = 0.30;
				ThisSoil.DUL[3] = 0.28;
				ThisSoil.DUL[4] = 0.29;
				ThisSoil.DUL[5] = 0.34;
				ThisSoil.DUL[6] = 0.30;
				ThisSoil.SAT[0] = 0.34;
				ThisSoil.SAT[1] = 0.34;
				ThisSoil.SAT[2] = 0.34;
				ThisSoil.SAT[3] = 0.34;
				ThisSoil.SAT[4] = 0.34;
				ThisSoil.SAT[5] = 0.34;
				ThisSoil.SAT[6] = 0.34;
				ThisSoil.SoilWater.Reset();
			}
			if ((IrrFactor == true) && (NitFactor == 250))
			{
				if (ThisSoil.Thickness.Length != 7)
				{
					throw new Exception("Soil layer exception");
				}
			 
				ThisSoil.LL15[0] = 0.12;
				ThisSoil.LL15[1] = 0.18;
				ThisSoil.LL15[2] = 0.17;
				ThisSoil.LL15[3] = 0.20;
				ThisSoil.LL15[4] = 0.27;
				ThisSoil.LL15[5] = 0.27;
				ThisSoil.LL15[6] = 0.21;
				ThisSoil.DUL[0] = 0.31;
				ThisSoil.DUL[1] = 0.28;
				ThisSoil.DUL[2] = 0.30;
				ThisSoil.DUL[3] = 0.28;
				ThisSoil.DUL[4] = 0.29;
				ThisSoil.DUL[5] = 0.34;
				ThisSoil.DUL[6] = 0.30;
				ThisSoil.SAT[0] = 0.34;
				ThisSoil.SAT[1] = 0.34;
				ThisSoil.SAT[2] = 0.34;
				ThisSoil.SAT[3] = 0.34;
				ThisSoil.SAT[4] = 0.34;
				ThisSoil.SAT[5] = 0.34;
				ThisSoil.SAT[6] = 0.34;
				ThisSoil.SoilWater.Reset();
			}
		}

		[EventSubscribe("Commencing")]
		private void OnSimulationCommencing(object sender, EventArgs e)
		{
			//	SetSoilLayers();
		}
		
		[EventSubscribe("DoManagement")]
		private void OnDoManagement(object sender, EventArgs e)
		{
			//Specific irrgations
			
			//Fodderbeet
			
			if ((IrrFactor == true) && (NitFactor == 300))
			{
				if ((DateUtilities.CompareDates("1-Feb", Clock.Today) == 0))
					Irrigation.Apply(40);
				if ((DateUtilities.CompareDates("1-Mar", Clock.Today) == 0))
					Irrigation.Apply(36);
			}
	    
			//Oats
			if (Clock.Today.Year == 2017)
			if ((DateUtilities.CompareDates("5-Jul", Clock.Today) == 0))
			if (IrrFactor == true)
			{
				if (NitFactor == 0)
					Fert.Apply(40, Models.Fertiliser.Types.NO3N, 10);
				if (NitFactor == 50)
					Fert.Apply(85, Models.Fertiliser.Types.NO3N, 10);
				if (NitFactor == 300)
					Fert.Apply(270, Models.Fertiliser.Types.NO3N, 10);
			   
			}
			 
			
			
		}
	}
		
		
}
```
        Report FRNLReport: EventNames=[Clock].DoReport
          VariableNames:
            [Clock].Today as Date
            [FodderBeet].Phenology.Stage as Stage_FB
            [Oats].Phenology.Stage as Stage_Oat
            [FodderBeet].Leaf.Live.Wt*10 as Leaf_DM_FB
            [FodderBeet].Petiole.Live.Wt*10 as Petiole_DM_FB
            [FodderBeet].Root.Live.Wt*10 as Root_DM_FB
            [FodderBeet].StorageRoot.Live.Wt*10 as Bulb_DM_FB
            [Oats].Leaf.Live.Wt*10 as Leaf_DM_Oat
            [Oats].Stem.Live.Wt*10 as Stem_DM_Oat
            [Oats].Spike.Live.Wt*10 as Spike_DM_Oat
            [Oats].Grain.Live.Wt*10 as Grain_DM_Oat
            [Oats].Root.Live.Wt*10 as Root_DM_Oat
            [FodderBeet].Leaf.NConc as Leaf_N_Perc_FB
            [FodderBeet].Petiole.NConc as Petiole_N_Perc_FB
            [FodderBeet].Root.NConc as Root_N_Perc_FB
            [FodderBeet].StorageRoot.NConc as Bulb_N_Perc_FB
            [Oats].Leaf.NConc as Leaf_N_Perc_Oat
            [Oats].Stem.NConc as Stem_N_Perc_Oat
            [Oats].Spike.NConc as Spike_N_Perc_Oat
            [Oats].Grain.NConc as Grain_N_Perc_Oat
            [Oats].Root.NConc as Root_N_Perc_Oat
            [FodderBeet].Leaf.LAI as LAI_FB
            [FodderBeet].Leaf.CoverTotal as RadInt_FB
            [Oats].Leaf.LAI as LAI_Oat
            [Oats].Leaf.CoverTotal as RadInt_Oat
            ([FodderBeet].Leaf.Transpiration + [Soil].SoilWater.Es + [MicroClimate].interception) as ETact_FB
            ([FodderBeet].Leaf.Transpiration + [Soil].SoilWater.Es + [MicroClimate].interception) as ETact_Oat
            [Soil].Temperature as SoilTemp
            [Soil].SoilWater.SW as SW
            [Soil].SoilWater.Drainage as Drainage
            sum([Soil].SoilNitrogen.MineralisedN) as N_min_prof
            sum([Soil].SoilNitrogen.Denitrification) as N_din_prof
            ([Soil].SoilWater.LeachNO3 + [Soil].SoilWater.LeachNH4) as N_leach_prof
        Soil: SoilType=NZ_sedementary; Region=Plains; State=Canterbury; Country=New Zealnd; Latitude=0; Longitude=0
          Analysis: Thickness=[100, 200, 300, 300, 300, 300]; PH=[6.6, 6.2, 5.7, 5.5, 5.5, 5.5]; PHUnits=Water; BoronUnits=HotWater
          Water
            Thickness  BD     AirDry  LL15  DUL   SAT    KS
            150        1      0.05    0.08  0.32  0.35   4832.039
            150        1.32   0.1     0.08  0.32  0.35   389.229
            300        1.35   0.149   0.08  0.32  0.342  16.362
            300        1.3    0.14    0.08  0.28  0.322  97.995
            300        1.3    0.15    0.08  0.28  0.348  97.995
            300        1.3    0.149   0.08  0.28  0.342  97.995
            300        1.3    0.1     0.08  0.28  0.307  97.995
            200        1.601  0.06    0.08  0.22  0.309  97.995
            SoilCrop OatsSoil: LL=[0.1, 0.1, 0.149, 0.129, 0.155, 0.149, 0.053, 0.061]; KL=[0.06, 0.06, 0.05, 0.08, 0.03, 0.01, 0, 0]; XF=[1, 1, 1, 1, 1, 1, 1, 1]
            SoilCrop FodderBeetSoil: LL=[0.12, 0.12, 0.12, 0.12, 0.12, 0.12, 0.12, 0.12]; KL=[0.1, 0.06, 0.06, 0.06, 0.06, 0.06, 0.06, 0.06]; XF=[1, 1, 1, 1, 1, 1, 1, 1]
            SoilCrop FB: LL=[0.15, 0.15, 0.15, 0.15, 0.15, 0.15, 0.15, 0.15]; KL=[0.06, 0.06, 0.06, 0.06, 0.06, 0.06, 0.06, 0.06]; XF=[1, 1, 1, 1, 1, 1, 1, 1]
          SoilWater: SummerDate=1-Nov; SummerU=6; SummerCona=2; WinterDate=1-Apr; WinterU=9; WinterCona=4.4; DiffusConst=0; DiffusSlope=0; Salb=0.18; CN2Bare=68; CNRed=20; CNCov=0.8; slope=0; discharge_width=0; catchment_area=0; max_pond=0; residueinterception=0
            Thickness  SWCON  KLAT
            200        0.7    0
            200        0.7    0
            200        0.95   0
            200        0.95   0
            200        0.95   0
            200        0.95   0
            200        0.95   0
            200        0.95   0
          SoilNitrogen: fom_type=[default, manure, mucuna, lablab, shemp, stable]; fract_carb=[0.2, 0.3, 0.54, 0.57, 0.45, 0]; fract_cell=[0.7, 0.3, 0.37, 0.37, 0.47, 0.1]; fract_lign=[0.1, 0.4, 0.09, 0.06, 0.08, 0.9]
          SoilOrganicMatter: RootCN=40; RootWt=1000; SoilCN=11; EnrACoeff=7.4; EnrBCoeff=0.2; OCUnits=Total
            Thickness  OC     FBiom  FInert
            180        3      0.06   0.437
            150        1.247  0.04   0.657
            400        0.316  0.012  0.85
            270        0.208  0.01   0.945
            500        0.2    0.01   0.983
          Sample Initial Soil Settings: NO3Units=kgha; NH4Units=kgha; SWUnits=Volumetric; OCUnits=Total; PHUnits=Water
            Thickness  NO3  NH4  SW
            200        18   32   0.3
            200        3    17   0.28
            200        5    6    0.24
            200        2    5    0.24
            200        2    5    0.28
            200        2    5    0.28
            200        3    5    0.28
            200        3    5    0.22
          CERESSoilTemperature
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